# OpenSim document version 40000
Model:
  ContactHalfSpace: socket_frame=/ground location=(0 0 0) orientation=(0 0 -1.570796)
  ContactSphere sphere_1_r: socket_frame=/bodyset/calcn_r location=(-0.00042152 -0.01 -0.0049972) radius=0.03232
  ContactSphere sphere_2_r: socket_frame=/bodyset/calcn_r location=(0.06 -0.01 0.020001) radius=0.03232
  ContactSphere sphere_3_r: socket_frame=/bodyset/calcn_r location=(0.165 -0.01 0.021183) radius=0.023374
  ContactSphere sphere_4_r: socket_frame=/bodyset/calcn_r location=(0.165 -0.01 -0.01) radius=0.020508
  ContactSphere sphere_5_r: socket_frame=/bodyset/toes_r location=(0.053154 -0.01 -0.0034173) radius=0.016244
  ContactSphere sphere_6_r: socket_frame=/bodyset/toes_r location=(1.7381e-6 -0.01 0.022294) radius=0.018414
  ContactSphere sphere_1_l: socket_frame=/bodyset/calcn_l location=(-0.00042152 -0.01 0.0049972) radius=0.03232
  ContactSphere sphere_2_l: socket_frame=/bodyset/calcn_l location=(0.06 -0.01 -0.020001) radius=0.03232
  ContactSphere sphere_3_l: socket_frame=/bodyset/calcn_l location=(0.165 -0.01 -0.021183) radius=0.023374
  ContactSphere sphere_4_l: socket_frame=/bodyset/calcn_l location=(0.165 -0.01 0.01) radius=0.020508
  ContactSphere sphere_5_l: socket_frame=/bodyset/toes_l location=(0.053154 -0.01 0.0034173) radius=0.016244
  ContactSphere sphere_6_l: socket_frame=/bodyset/toes_l location=(1.7381e-6 -0.01 -0.022294) radius=0.018414
  SmoothSphereHalfSpaceForce [values shared by the 12 below unless stated]: socket_half_space=/contactHalfSpace
      stiffness=1000000 [N/m^2] dissipation=2 [s/m] static_friction=0.8 dynamic_friction=0.8 viscous_friction=0.5
      transition_velocity=0.2 [m/s]
  SmoothSphereHalfSpaceForce Contact_1r: socket_sphere=/sphere_1_r
  SmoothSphereHalfSpaceForce Contact_2r: socket_sphere=/sphere_2_r
  SmoothSphereHalfSpaceForce Contact_3r: socket_sphere=/sphere_3_r
  SmoothSphereHalfSpaceForce Contact_4r: socket_sphere=/sphere_4_r
  SmoothSphereHalfSpaceForce Contact_5r: socket_sphere=/sphere_5_r
  SmoothSphereHalfSpaceForce Contact_6r: socket_sphere=/sphere_6_r
  SmoothSphereHalfSpaceForce Contact_1l: socket_sphere=/sphere_1_l
  SmoothSphereHalfSpaceForce Contact_2l: socket_sphere=/sphere_2_l
  SmoothSphereHalfSpaceForce Contact_3l: socket_sphere=/sphere_3_l
  SmoothSphereHalfSpaceForce Contact_4l: socket_sphere=/sphere_4_l
  SmoothSphereHalfSpaceForce Contact_5l: socket_sphere=/sphere_5_l
  SmoothSphereHalfSpaceForce Contact_6l: socket_sphere=/sphere_6_l
  Ground
  BodySet:
    Body pelvis: mass=9.127837 [kg] mass_center=(-0.0655315 0 0) inertia=(0.0705367 0.0705367 0.0385543 0 0 0)
    Body femur_l: mass=7.209107 mass_center=(0 -0.152829 0) inertia=(0.0838736 0.0219862 0.088446 0 0 0)
    Body femur_r: mass=7.209107 mass_center=(0 -0.152829 0) inertia=(0.0838736 0.0219862 0.088446 0 0 0)
    Body tibia_l: mass=3.313521 mass_center=(-0.005059271 -0.1929973 0)
        inertia=(0.04758035 0.006862605 0.04792965 0 0 0)
    Body tibia_r: mass=3.313521 mass_center=(-0.005059271 -0.1929973 0)
        inertia=(0.04758035 0.006862605 0.04792965 0 0 0)
    Body talus_l: mass=0.5175056 mass_center=(0 -0.005059271 0) inertia=(0.002760617 0.007447371 0.005660617 0 0 0)
    Body talus_r: mass=0.5175056 mass_center=(0 -0.005059271 0) inertia=(0.002760617 0.007447371 0.005660617 0 0 0)
    Body calcn_l: mass=0.9688202 mass_center=(0.0913924 0.0274177 0) inertia=(0.000906321 0.00252475 0.00265422 0 0 0)
    Body calcn_r: mass=0.9688202 mass_center=(0.0913924 0.0274177 0) inertia=(0.000906321 0.00252475 0.00265422 0 0 0)
    Body toes_l: mass=0.1678772 mass_center=(0.0316218 0.00548355 0.0159937)
        inertia=(6.271413e-5 0.0001254283 6.271413e-5 0 0 0)
    Body toes_r: mass=0.1678772 mass_center=(0.0316218 0.00548355 -0.0159937)
        inertia=(6.271413e-5 0.0001254283 6.271413e-5 0 0 0)
    Body torso: mass=26.53529 mass_center=(-0.0267603 0.306505 0) inertia=(1.10388 0.507805 1.10388 0 0 0)
    Body humerus_l: mass=1.575348 mass_center=(0 -0.150554 0) inertia=(0.00775535 0.00267536 0.00870516 0 0 0)
    Body humerus_r: mass=1.575348 mass_center=(0 -0.150554 0) inertia=(0.00775535 0.00267536 0.00870516 0 0 0)
    Body ulna_l: mass=0.4708466 mass_center=(0 -0.114441 0) inertia=(0.00206978 0.000431845 0.00224518 0 0 0)
    Body ulna_r: mass=0.4708466 mass_center=(0 -0.114441 0) inertia=(0.00206978 0.000431845 0.00224518 0 0 0)
    Body radius_l: mass=0.4708466 mass_center=(0 -0.114441 0) inertia=(0.00206978 0.000431845 0.00224518 0 0 0)
    Body radius_r: mass=0.4708466 mass_center=(0 -0.114441 0) inertia=(0.00206978 0.000431845 0.00224518 0 0 0)
    Body hand_l: mass=0.3545882 mass_center=(0 -0.0668239 0) inertia=(0.0006449744 0.0003955168 0.0009689078 0 0 0)
    Body hand_r: mass=0.3545882 mass_center=(0 -0.0668239 0) inertia=(0.0006449744 0.0003955168 0.0009689078 0 0 0)
  JointSet:
    CustomJoint ground_pelvis: socket_parent_frame=ground_offset socket_child_frame=pelvis_offset
      Coordinate pelvis_tilt
      Coordinate pelvis_list
      Coordinate pelvis_rotation
      Coordinate pelvis_tx
      Coordinate pelvis_ty
      Coordinate pelvis_tz
      PhysicalOffsetFrame ground_offset: socket_parent=/ground translation=(0 0 0) [meters]
      PhysicalOffsetFrame pelvis_offset: socket_parent=/bodyset/pelvis translation=(0 0 0)
      SpatialTransform:
        TransformAxis rotation1: coordinates=pelvis_tilt axis=(0 0 1) LinearFunction(coefficients=1 0)
        TransformAxis rotation2: coordinates=pelvis_list axis=(1 0 0) LinearFunction(coefficients=1 0)
        TransformAxis rotation3: coordinates=pelvis_rotation axis=(0 1 0) LinearFunction(coefficients=1 0)
        TransformAxis translation1: coordinates=pelvis_tx axis=(1 0 0) LinearFunction(coefficients=1 0)
        TransformAxis translation2: coordinates=pelvis_ty axis=(0 1 0) LinearFunction(coefficients=1 0)
        TransformAxis translation3: coordinates=pelvis_tz axis=(0 0 1) LinearFunction(coefficients=1 0)
    CustomJoint hip_l: socket_parent_frame=pelvis_offset socket_child_frame=femur_l_offset
      Coordinate hip_flexion_l
      Coordinate hip_adduction_l
      Coordinate hip_rotation_l
      PhysicalOffsetFrame pelvis_offset: socket_parent=/bodyset/pelvis
          translation=(-0.06553146 -0.06126775 -0.07901911)
      PhysicalOffsetFrame femur_l_offset: socket_parent=/bodyset/femur_l translation=(0 0 0)
      SpatialTransform:
        TransformAxis rotation1: coordinates=hip_flexion_l axis=(0 0 1) LinearFunction(coefficients=1 0)
        TransformAxis rotation2: coordinates=hip_adduction_l axis=(-1 0 0) LinearFunction(coefficients=1 0)
        TransformAxis rotation3: coordinates=hip_rotation_l axis=(0 -1 0) LinearFunction(coefficients=1 0)
        TransformAxis translation1: axis=(1 0 0)
        TransformAxis translation2: axis=(0 1 0)
        TransformAxis translation3: axis=(0 0 1)
    CustomJoint hip_r: socket_parent_frame=pelvis_offset socket_child_frame=femur_r_offset
      Coordinate hip_flexion_r
      Coordinate hip_adduction_r
      Coordinate hip_rotation_r
      PhysicalOffsetFrame pelvis_offset: socket_parent=/bodyset/pelvis translation=(-0.06553146 -0.06126775 0.07901911)
      PhysicalOffsetFrame femur_r_offset: socket_parent=/bodyset/femur_r translation=(0 0 0)
      SpatialTransform:
        TransformAxis rotation1: coordinates=hip_flexion_r axis=(0 0 1) LinearFunction(coefficients=1 0)
        TransformAxis rotation2: coordinates=hip_adduction_r axis=(1 0 0) LinearFunction(coefficients=1 0)
        TransformAxis rotation3: coordinates=hip_rotation_r axis=(0 1 0) LinearFunction(coefficients=1 0)
        TransformAxis translation1: axis=(1 0 0)
        TransformAxis translation2: axis=(0 1 0)
        TransformAxis translation3: axis=(0 0 1)
    CustomJoint knee_l: socket_parent_frame=femur_l_offset socket_child_frame=tibia_l_offset
      Coordinate knee_angle_l
      PhysicalOffsetFrame femur_l_offset: socket_parent=/bodyset/femur_l translation=(-0.004045327 -0.3558386 0)
      PhysicalOffsetFrame tibia_l_offset: socket_parent=/bodyset/tibia_l translation=(0 0 0)
      SpatialTransform:
        TransformAxis rotation1: axis=(1 0 0)
        TransformAxis rotation2: axis=(0 1 0)
        TransformAxis rotation3: coordinates=knee_angle_l axis=(0 0 1) LinearFunction(coefficients=1 0)
        TransformAxis translation1: axis=(1 0 0)
        TransformAxis translation2: axis=(0 1 0)
        TransformAxis translation3: axis=(0 0 1)
    CustomJoint knee_r: socket_parent_frame=femur_r_offset socket_child_frame=tibia_r_offset
      Coordinate knee_angle_r
      PhysicalOffsetFrame femur_r_offset: socket_parent=/bodyset/femur_r translation=(-0.004045327 -0.3558386 0)
      PhysicalOffsetFrame tibia_r_offset: socket_parent=/bodyset/tibia_r translation=(0 0 0)
      SpatialTransform:
        TransformAxis rotation1: axis=(1 0 0)
        TransformAxis rotation2: axis=(0 1 0)
        TransformAxis rotation3: coordinates=knee_angle_r axis=(0 0 1) LinearFunction(coefficients=1 0)
        TransformAxis translation1: axis=(1 0 0)
        TransformAxis translation2: axis=(0 1 0)
        TransformAxis translation3: axis=(0 0 1)
    CustomJoint ankle_l: socket_parent_frame=tibia_l_offset socket_child_frame=talus_l_offset
      Coordinate ankle_angle_l
      PhysicalOffsetFrame tibia_l_offset: socket_parent=/bodyset/tibia_l translation=(0 -0.4108588 0)
      PhysicalOffsetFrame talus_l_offset: socket_parent=/bodyset/talus_l translation=(0 0 0)
      SpatialTransform:
        TransformAxis rotation1: coordinates=ankle_angle_l axis=(0.1050135 0.1740224 0.9791263)
            LinearFunction(coefficients=1 0)
        TransformAxis rotation2: axis=(0 1 0)
        TransformAxis rotation3: axis=(0 0 1)
        TransformAxis translation1: axis=(1 0 0)
        TransformAxis translation2: axis=(0 1 0)
        TransformAxis translation3: axis=(0 0 1)
    CustomJoint ankle_r: socket_parent_frame=tibia_r_offset socket_child_frame=talus_r_offset
      Coordinate ankle_angle_r
      PhysicalOffsetFrame tibia_r_offset: socket_parent=/bodyset/tibia_r translation=(0 -0.4108588 0)
      PhysicalOffsetFrame talus_r_offset: socket_parent=/bodyset/talus_r translation=(0 0 0)
      SpatialTransform:
        TransformAxis rotation1: coordinates=ankle_angle_r axis=(-0.1050135 -0.1740224 0.9791263)
            LinearFunction(coefficients=1 0)
        TransformAxis rotation2: axis=(0 1 0)
        TransformAxis rotation3: axis=(0 0 1)
        TransformAxis translation1: axis=(1 0 0)
        TransformAxis translation2: axis=(0 1 0)
        TransformAxis translation3: axis=(0 0 1)
    CustomJoint subtalar_l: socket_parent_frame=talus_l_offset socket_child_frame=calcn_l_offset
      Coordinate subtalar_angle_l
      PhysicalOffsetFrame talus_l_offset: socket_parent=/bodyset/talus_l
          translation=(-0.0445721 -0.0383391 -0.00723828)
      PhysicalOffsetFrame calcn_l_offset: socket_parent=/bodyset/calcn_l translation=(0 0 0)
      SpatialTransform:
        TransformAxis rotation1: coordinates=subtalar_angle_l axis=(-0.7871796 -0.6047475 -0.1209495)
            LinearFunction(coefficients=1 0)
        TransformAxis rotation2: axis=(0 1 0)
        TransformAxis rotation3: axis=(0 0 1)
        TransformAxis translation1: axis=(1 0 0)
        TransformAxis translation2: axis=(0 1 0)
        TransformAxis translation3: axis=(0 0 1)
    CustomJoint subtalar_r: socket_parent_frame=talus_r_offset socket_child_frame=calcn_r_offset
      Coordinate subtalar_angle_r
      PhysicalOffsetFrame talus_r_offset: socket_parent=/bodyset/talus_r translation=(-0.0445721 -0.0383391 0.00723828)
      PhysicalOffsetFrame calcn_r_offset: socket_parent=/bodyset/calcn_r translation=(0 0 0)
      SpatialTransform:
        TransformAxis rotation1: coordinates=subtalar_angle_r axis=(0.7871796 0.6047475 -0.1209495)
            LinearFunction(coefficients=1 0)
        TransformAxis rotation2: axis=(0 1 0)
        TransformAxis rotation3: axis=(0 0 1)
        TransformAxis translation1: axis=(1 0 0)
        TransformAxis translation2: axis=(0 1 0)
        TransformAxis translation3: axis=(0 0 1)
    PinJoint mtp_l: socket_parent_frame=calcn_l_offset socket_child_frame=toes_l_offset
      Coordinate mtp_l_coord_0
      PhysicalOffsetFrame calcn_l_offset: socket_parent=/bodyset/calcn_l
          translation=(0.1634097 -0.001827849 -0.0009870383)
      PhysicalOffsetFrame toes_l_offset: socket_parent=/bodyset/toes_l translation=(0 0 0)
    PinJoint mtp_r: socket_parent_frame=calcn_r_offset socket_child_frame=toes_r_offset
      Coordinate mtp_r_coord_0
      PhysicalOffsetFrame calcn_r_offset: socket_parent=/bodyset/calcn_r
          translation=(0.1634097 -0.001827849 0.0009870383)
      PhysicalOffsetFrame toes_r_offset: socket_parent=/bodyset/toes_r translation=(0 0 0)
    CustomJoint back: socket_parent_frame=pelvis_offset socket_child_frame=torso_offset
      Coordinate lumbar_extension
      Coordinate lumbar_bending
      Coordinate lumbar_rotation
      PhysicalOffsetFrame pelvis_offset: socket_parent=/bodyset/pelvis translation=(-0.09333831 0.07554194 0)
      PhysicalOffsetFrame torso_offset: socket_parent=/bodyset/torso translation=(0 0 0)
      SpatialTransform:
        TransformAxis rotation1: coordinates=lumbar_extension axis=(0 0 1) LinearFunction(coefficients=1 0)
        TransformAxis rotation2: coordinates=lumbar_bending axis=(1 0 0) LinearFunction(coefficients=1 0)
        TransformAxis rotation3: coordinates=lumbar_rotation axis=(0 1 0) LinearFunction(coefficients=1 0)
        TransformAxis translation1: axis=(1 0 0)
        TransformAxis translation2: axis=(0 1 0)
        TransformAxis translation3: axis=(0 0 1)
    CustomJoint shoulder_l: socket_parent_frame=torso_offset socket_child_frame=humerus_l_offset
      Coordinate arm_flex_l
      Coordinate arm_add_l
      Coordinate arm_rot_l
      PhysicalOffsetFrame torso_offset: socket_parent=/bodyset/torso translation=(0.002938086 0.3714855 -0.1583125)
      PhysicalOffsetFrame humerus_l_offset: socket_parent=/bodyset/humerus_l translation=(0 0 0)
      SpatialTransform:
        TransformAxis rotation1: coordinates=arm_flex_l axis=(0 0 1) LinearFunction(coefficients=1 0)
        TransformAxis rotation2: coordinates=arm_add_l axis=(-1 0 0) LinearFunction(coefficients=1 0)
        TransformAxis rotation3: coordinates=arm_rot_l axis=(0 -1 0) LinearFunction(coefficients=1 0)
        TransformAxis translation1: axis=(1 0 0)
        TransformAxis translation2: axis=(0 1 0)
        TransformAxis translation3: axis=(0 0 1)
    CustomJoint shoulder_r: socket_parent_frame=torso_offset socket_child_frame=humerus_r_offset
      Coordinate arm_flex_r
      Coordinate arm_add_r
      Coordinate arm_rot_r
      PhysicalOffsetFrame torso_offset: socket_parent=/bodyset/torso translation=(0.002938086 0.3714855 0.1583125)
      PhysicalOffsetFrame humerus_r_offset: socket_parent=/bodyset/humerus_r translation=(0 0 0)
      SpatialTransform:
        TransformAxis rotation1: coordinates=arm_flex_r axis=(0 0 1) LinearFunction(coefficients=1 0)
        TransformAxis rotation2: coordinates=arm_add_r axis=(1 0 0) LinearFunction(coefficients=1 0)
        TransformAxis rotation3: coordinates=arm_rot_r axis=(0 1 0) LinearFunction(coefficients=1 0)
        TransformAxis translation1: axis=(1 0 0)
        TransformAxis translation2: axis=(0 1 0)
        TransformAxis translation3: axis=(0 0 1)
    CustomJoint elbow_l: socket_parent_frame=humerus_l_offset socket_child_frame=ulna_l_offset
      Coordinate elbow_flex_l
      PhysicalOffsetFrame humerus_l_offset: socket_parent=/bodyset/humerus_l
          translation=(0.01202961 -0.2620015 0.008781487)
      PhysicalOffsetFrame ulna_l_offset: socket_parent=/bodyset/ulna_l translation=(0 0 0)
      SpatialTransform:
        TransformAxis rotation1: coordinates=elbow_flex_l axis=(-0.226047 -0.022269 0.9738618)
            LinearFunction(coefficients=1 0)
        TransformAxis rotation2: axis=(0 1 0)
        TransformAxis rotation3: axis=(0 0 1)
        TransformAxis translation1: axis=(1 0 0)
        TransformAxis translation2: axis=(0 1 0)
        TransformAxis translation3: axis=(0 0 1)
    CustomJoint elbow_r: socket_parent_frame=humerus_r_offset socket_child_frame=ulna_r_offset
      Coordinate elbow_flex_r
      PhysicalOffsetFrame humerus_r_offset: socket_parent=/bodyset/humerus_r
          translation=(0.01202961 -0.2620015 -0.008781487)
      PhysicalOffsetFrame ulna_r_offset: socket_parent=/bodyset/ulna_r translation=(0 0 0)
      SpatialTransform:
        TransformAxis rotation1: coordinates=elbow_flex_r axis=(0.226047 0.022269 0.9738618)
            LinearFunction(coefficients=1 0)
        TransformAxis rotation2: axis=(0 1 0)
        TransformAxis rotation3: axis=(0 0 1)
        TransformAxis translation1: axis=(1 0 0)
        TransformAxis translation2: axis=(0 1 0)
        TransformAxis translation3: axis=(0 0 1)
    CustomJoint radioulnar_l: socket_parent_frame=ulna_l_offset socket_child_frame=radius_l_offset
      Coordinate pro_sup_l
      PhysicalOffsetFrame ulna_l_offset: socket_parent=/bodyset/ulna_l
          translation=(-0.006387412 -0.01235039 -0.02476628)
      PhysicalOffsetFrame radius_l_offset: socket_parent=/bodyset/radius_l translation=(0 0 0)
      SpatialTransform:
        TransformAxis rotation1: coordinates=pro_sup_l axis=(-0.05639803 -0.9984065 0.001952)
            LinearFunction(coefficients=1 0)
        TransformAxis rotation2: axis=(0 1 0)
        TransformAxis rotation3: axis=(0 0 1)
        TransformAxis translation1: axis=(1 0 0)
        TransformAxis translation2: axis=(0 1 0)
        TransformAxis translation3: axis=(0 0 1)
    CustomJoint radioulnar_r: socket_parent_frame=ulna_r_offset socket_child_frame=radius_r_offset
      Coordinate pro_sup_r
      PhysicalOffsetFrame ulna_r_offset: socket_parent=/bodyset/ulna_r
          translation=(-0.006387412 -0.01235039 0.02476628)
      PhysicalOffsetFrame radius_r_offset: socket_parent=/bodyset/radius_r translation=(0 0 0)
      SpatialTransform:
        TransformAxis rotation1: coordinates=pro_sup_r axis=(0.05639803 0.9984065 0.001952)
            LinearFunction(coefficients=1 0)
        TransformAxis rotation2: axis=(0 1 0)
        TransformAxis rotation3: axis=(0 0 1)
        TransformAxis translation1: axis=(1 0 0)
        TransformAxis translation2: axis=(0 1 0)
        TransformAxis translation3: axis=(0 0 1)
    WeldJoint radius_hand_l: socket_parent_frame=radius_l_offset socket_child_frame=hand_l_offset
      PhysicalOffsetFrame radius_l_offset: socket_parent=/bodyset/radius_l
          translation=(-0.008352916 -0.2239358 -0.0129229)
      PhysicalOffsetFrame hand_l_offset: socket_parent=/bodyset/hand_l translation=(0 0 0)
    WeldJoint radius_hand_r: socket_parent_frame=radius_r_offset socket_child_frame=hand_r_offset
      PhysicalOffsetFrame radius_r_offset: socket_parent=/bodyset/radius_r
          translation=(-0.008352916 -0.2239358 0.0129229)
      PhysicalOffsetFrame hand_r_offset: socket_parent=/bodyset/hand_r translation=(0 0 0)
