# OpenSim document version 40000
Model:
  ContactSphere contacSphere: socket_frame=/bodyset/Segment2 location=(0 -0.65 0) radius=0.1
  ContactHalfSpace: socket_frame=/ground location=(0 0 0) orientation=(0 0 -1.570796)
  SmoothSphereHalfSpaceForce Endoint: socket_sphere=/contacSphere socket_half_space=/contactHalfSpace
      stiffness=250000 [N/m^2] dissipation=2 [s/m] static_friction=0.8 dynamic_friction=0.8 viscous_friction=0.5
      transition_velocity=0.2 [m/s]
  Ground
  BodySet:
    Body Base: mass=3.4465 [kg] mass_center=(0 -0.062356 0) inertia=(0.0070757 0.091049 0.096688 0 0 0)
    Body Segment1: mass=3.6424 mass_center=(0 -0.325 0) inertia=(0.16228 0.0037128 0.16448 0 0 0)
    Body Segment2: mass=3.6424 mass_center=(0 -0.325 0) inertia=(0.16228 0.0037128 0.16448 0 0 0)
  JointSet:
    CustomJoint ground_base: socket_parent_frame=ground_offset socket_child_frame=Base_offset
      Coordinate Base_rx
      Coordinate Base_ry
      Coordinate Base_rz
      Coordinate Base_tx
      Coordinate Base_ty
      Coordinate Base_tz
      PhysicalOffsetFrame ground_offset: socket_parent=/ground translation=(0 0 0) [meters]
      PhysicalOffsetFrame Base_offset: socket_parent=/bodyset/Base translation=(-0.3 0 0)
      SpatialTransform:
        TransformAxis rotation1: coordinates=Base_rx axis=(1 0 0) LinearFunction(coefficients=1 0)
        TransformAxis rotation2: coordinates=Base_ry axis=(0 1 0) LinearFunction(coefficients=1 0)
        TransformAxis rotation3: coordinates=Base_rz axis=(0 0 1) LinearFunction(coefficients=1 0)
        TransformAxis translation1: coordinates=Base_tx axis=(1 0 0) LinearFunction(coefficients=1 0)
        TransformAxis translation2: coordinates=Base_ty axis=(0 1 0) LinearFunction(coefficients=1 0)
        TransformAxis translation3: coordinates=Base_tz axis=(0 0 1) LinearFunction(coefficients=1 0)
    CustomJoint Joint1: socket_parent_frame=Base_offset socket_child_frame=Segment1_offset
      Coordinate joint_1
      PhysicalOffsetFrame Base_offset: socket_parent=/bodyset/Base translation=(0 -0.15 0)
      PhysicalOffsetFrame Segment1_offset: socket_parent=/bodyset/Segment1 translation=(0 0 0)
      SpatialTransform:
        TransformAxis rotation1: axis=(1 0 0)
        TransformAxis rotation2: axis=(0 1 0)
        TransformAxis rotation3: coordinates=joint_1 axis=(0 0 1) LinearFunction(coefficients=1 0)
        TransformAxis translation1: axis=(1 0 0)
        TransformAxis translation2: axis=(0 1 0)
        TransformAxis translation3: axis=(0 0 1)
    CustomJoint Joint2: socket_parent_frame=Segment1_offset socket_child_frame=Segment2_offset
      Coordinate joint_2
      PhysicalOffsetFrame Segment1_offset: socket_parent=/bodyset/Segment1 translation=(0 -0.65 0)
      PhysicalOffsetFrame Segment2_offset: socket_parent=/bodyset/Segment2 translation=(0 0 0)
      SpatialTransform:
        TransformAxis rotation1: axis=(1 0 0)
        TransformAxis rotation2: axis=(0 1 0)
        TransformAxis rotation3: coordinates=joint_2 axis=(0 0 1) LinearFunction(coefficients=1 0)
        TransformAxis translation1: axis=(1 0 0)
        TransformAxis translation2: axis=(0 1 0)
        TransformAxis translation3: axis=(0 0 1)
