# OpenSim document version 30000
Model subject1_Scaled:
  length_units: meters
  force_units: N
  gravity: 0 -9.8066 0
  credits:
    Delp S.L., Loan J.P., Hoy M.G., Zajac F.E., Topp E.L., Rosen J.M., Thelen D.G., Anderson F.C., Seth A. Notes: 3D, 23 DOF gait model created by D.G. Thelen, Univ. of Wisconsin-Madison, and Ajay Seth, Frank C. Anderson, and Scott L. Delp, Stanford University. Lower extremity joint defintions based on Delp et al. (1990). Low back joint and anthropometry based on Anderson and Pandy (1999, 2001). Planar knee model of Yamaguchi and Zajac (1989). Seth replaced tibia translation constraints with a CustomJoint for the knee and removed the patella to eliminate all kinematic constraints; insertions of the quadrucepts are handled with moving points in the tibia frame as defined by Delp 1990. License: Creative Commons (CCBY 3.0). You are free to distribute, remix, tweak, and build upon this work, even commercially, as long as you credit us for the original creation. http://creativecommons.org/licenses/by/3.0/ More Information: http://simtk-confluence.stanford.edu:8080/display/OpenSim/Gait+2392+and+2354+Models
  publications:
    Delp, S.L., Loan, J.P., Hoy, M.G., Zajac, F.E., Topp E.L., Rosen, J.M.: An interactive graphics-based model of the lower extremity to study orthopaedic surgical procedures, IEEE Transactions on Biomedical Engineering, vol. 37, pp. 757-767, 1990. Yamaguchi G.T., Zajac F.E.: A planar model of the knee joint to characterize the knee extensor mechanism." J . Biomecl7. vol. 21. pp. 1-10. 1989. Anderson F.C., Pandy M.G.: A dynamic optimization solution for vertical jumping in three dimensions. Computer Methods in Biomechanics and Biomedical Engineering 2:201-231, 1999. Anderson F.C., Pandy M.G.: Dynamic optimization of human walking. Journal of Biomechanical Engineering 123:381-390, 2001.
  BodySet:
    Body ground: mass=0 mass_center=(0 0 0) inertia_xx=0 inertia_yy=0 inertia_zz=0 meshes=treadmill.vtp
    Body pelvis: mass=8.8426 mass_center=(-0.068278 0 0) inertia_xx=0.07418 inertia_yy=0.07418 inertia_zz=0.040546
        meshes=(sacrum.vtp pelvis.vtp l_pelvis.vtp)
      CustomJoint ground_pelvis: parent_body=ground location_in_parent=(0 0 0) location=(0 0 0)
        Coordinate pelvis_tilt: motion_type=rotational default_value=0 range=(-1.5708 1.5708) clamped=false
        Coordinate pelvis_list: motion_type=rotational default_value=0 range=(-1.5708 1.5708) clamped=false
        Coordinate pelvis_rotation: motion_type=rotational default_value=0 range=(-1.5708 1.5708) clamped=false
        Coordinate pelvis_tx: motion_type=translational default_value=0 range=(-5 5) clamped=false
        Coordinate pelvis_ty: motion_type=translational default_value=0 range=(-1 2) clamped=false
        Coordinate pelvis_tz: motion_type=translational default_value=0 range=(-3 3) clamped=false
        SpatialTransform:
          # 3 Axes for rotations are listed first.
          TransformAxis rotation1: coordinates=pelvis_tilt axis=(0 0 1) LinearFunction(coefficients=1 0)
          TransformAxis rotation2: coordinates=pelvis_list axis=(1 0 0) LinearFunction(coefficients=1 0)
          TransformAxis rotation3: coordinates=pelvis_rotation axis=(0 1 0) LinearFunction(coefficients=1 0)
          TransformAxis translation1: coordinates=pelvis_tx axis=(1 0 0) LinearFunction(coefficients=1 0)
          TransformAxis translation2: coordinates=pelvis_ty axis=(0 1 0) LinearFunction(coefficients=1 0)
          TransformAxis translation3: coordinates=pelvis_tz axis=(0 0 1) LinearFunction(coefficients=1 0)
    Body femur_r: mass=6.9838 mass_center=(0 -0.17047 0) inertia_xx=0.10109 inertia_yy=0.026499 inertia_zz=0.1066
        meshes=femur.vtp
      CustomJoint hip_r: parent_body=pelvis location_in_parent=(-0.068278 -0.063835 0.082331) location=(0 0 0)
        Coordinate hip_flexion_r: motion_type=rotational default_value=0 range=(-2.0944 2.0944) clamped=false
        Coordinate hip_adduction_r: motion_type=rotational default_value=0 range=(-2.0944 2.0944) clamped=false
        Coordinate hip_rotation_r: motion_type=rotational default_value=0 range=(-2.0944 2.0944) clamped=false
        SpatialTransform: axes_held_at_zero=(translation1 translation2 translation3)
          # 3 Axes for rotations are listed first.
          TransformAxis rotation1: coordinates=hip_flexion_r axis=(0 0 1) LinearFunction(coefficients=1 0)
          TransformAxis rotation2: coordinates=hip_adduction_r axis=(1 0 0) LinearFunction(coefficients=1 0)
          TransformAxis rotation3: coordinates=hip_rotation_r axis=(0 1 0) LinearFunction(coefficients=1 0)
    Body tibia_r: mass=2.7837 mass_center=(0 -0.18049 0) inertia_xx=0.035366 inertia_yy=0.0035787 inertia_zz=0.035857
        meshes=(tibia.vtp fibula.vtp)
      CustomJoint knee_r: parent_body=femur_r location_in_parent=(-0.0045122 -0.39691 0) location=(0 0 0)
        Coordinate knee_angle_r: motion_type=rotational default_value=0 range=(-2.0944 0.17453) clamped=false
        SpatialTransform: axes_held_at_zero=(rotation2 rotation3 translation1 translation2 translation3)
          # 3 Axes for rotations are listed first.
          TransformAxis rotation1: coordinates=knee_angle_r axis=(0 0 1) LinearFunction(coefficients=1 0)
    Body talus_r: mass=0.075084 mass_center=(0 0 0) inertia_xx=0.00062714 inertia_yy=0.00062714 inertia_zz=0.00062714
        meshes=talus.vtp
      CustomJoint ankle_r: parent_body=tibia_r location_in_parent=(0 -0.41569 0) location=(0 0 0)
        Coordinate ankle_angle_r: motion_type=rotational default_value=0 range=(-1.5708 1.5708) clamped=false
        SpatialTransform: axes_held_at_zero=(rotation2 rotation3 translation1 translation2 translation3)
          # 3 Axes for rotations are listed first.
          TransformAxis rotation1: coordinates=ankle_angle_r axis=(-0.10501 -0.17402 0.97913)
              LinearFunction(coefficients=1 0)
    Body calcn_r: mass=0.93854 mass_center=(0.091392 0.027418 0) inertia_xx=0.000878 inertia_yy=0.0024459
        inertia_zz=0.0025713 meshes=foot.vtp
      CustomJoint subtalar_r: parent_body=talus_r location_in_parent=(-0.044572 -0.038339 0.0072383) location=(0 0 0)
        Coordinate subtalar_angle_r: motion_type=rotational default_value=0 range=(-1.5708 1.5708) clamped=false
        SpatialTransform: axes_held_at_zero=(rotation2 rotation3 translation1 translation2 translation3)
          # 3 Axes for rotations are listed first.
          TransformAxis rotation1: coordinates=subtalar_angle_r axis=(0.78718 0.60475 -0.12095)
              LinearFunction(coefficients=1 0)
    Body toes_r: mass=0.16263 mass_center=(0.031622 0.0054836 -0.015994) inertia_xx=6.2714e-5 inertia_yy=0.00012543
        inertia_zz=6.2714e-5 meshes=bofoot.vtp
      PinJoint mtp_r: parent_body=calcn_r location_in_parent=(0.16341 -0.0018278 0.00098704) location=(0 0 0)
        Coordinate mtp_angle_r: motion_type=rotational default_value=0 range=(-1.5708 1.5708) clamped=false
    Body femur_l: mass=6.9838 mass_center=(0 -0.17047 0) inertia_xx=0.10109 inertia_yy=0.026499 inertia_zz=0.1066
        meshes=l_femur.vtp
      CustomJoint hip_l: parent_body=pelvis location_in_parent=(-0.068278 -0.063835 -0.082331) location=(0 0 0)
        Coordinate hip_flexion_l: motion_type=rotational default_value=0 range=(-2.0944 2.0944) clamped=false
        Coordinate hip_adduction_l: motion_type=rotational default_value=0 range=(-2.0944 2.0944) clamped=false
        Coordinate hip_rotation_l: motion_type=rotational default_value=0 range=(-2.0944 2.0944) clamped=false
        SpatialTransform: axes_held_at_zero=(translation1 translation2 translation3)
          # 3 Axes for rotations are listed first.
          TransformAxis rotation1: coordinates=hip_flexion_l axis=(0 0 1) LinearFunction(coefficients=1 0)
          TransformAxis rotation2: coordinates=hip_adduction_l axis=(-1 0 0) LinearFunction(coefficients=1 0)
          TransformAxis rotation3: coordinates=hip_rotation_l axis=(0 -1 0) LinearFunction(coefficients=1 0)
    Body tibia_l: mass=2.7837 mass_center=(0 -0.18049 0) inertia_xx=0.035366 inertia_yy=0.0035787 inertia_zz=0.035857
        meshes=(l_tibia.vtp l_fibula.vtp)
      CustomJoint knee_l: parent_body=femur_l location_in_parent=(-0.0045122 -0.39691 0) location=(0 0 0)
        Coordinate knee_angle_l: motion_type=rotational default_value=0 range=(-2.0944 0.17453) clamped=false
        SpatialTransform: axes_held_at_zero=(rotation2 rotation3 translation1 translation2 translation3)
          # 3 Axes for rotations are listed first.
          TransformAxis rotation1: coordinates=knee_angle_l axis=(0 0 1) LinearFunction(coefficients=1 0)
    Body talus_l: mass=0.075084 mass_center=(0 0 0) inertia_xx=0.00062714 inertia_yy=0.00062714 inertia_zz=0.00062714
        meshes=l_talus.vtp
      CustomJoint ankle_l: parent_body=tibia_l location_in_parent=(0 -0.41569 0) location=(0 0 0)
        Coordinate ankle_angle_l: motion_type=rotational default_value=0 range=(-1.0472 1.0472) clamped=false
        SpatialTransform: axes_held_at_zero=(rotation2 rotation3 translation1 translation2 translation3)
          # 3 Axes for rotations are listed first.
          TransformAxis rotation1: coordinates=ankle_angle_l axis=(0.10501 0.17402 0.97913)
              LinearFunction(coefficients=1 0)
    Body calcn_l: mass=0.93854 mass_center=(0.091392 0.027418 0) inertia_xx=0.000878 inertia_yy=0.0024459
        inertia_zz=0.0025713 meshes=l_foot.vtp
      CustomJoint subtalar_l: parent_body=talus_l location_in_parent=(-0.044572 -0.038339 -0.0072383) location=(0 0 0)
        Coordinate subtalar_angle_l: motion_type=rotational default_value=0 range=(-1.5708 1.5708) clamped=false
        SpatialTransform: axes_held_at_zero=(rotation2 rotation3 translation1 translation2 translation3)
          # 3 Axes for rotations are listed first.
          TransformAxis rotation1: coordinates=subtalar_angle_l axis=(-0.78718 -0.60475 -0.12095)
              LinearFunction(coefficients=1 0)
    Body toes_l: mass=0.16263 mass_center=(0.031622 0.0054836 0.015994) inertia_xx=6.2714e-5 inertia_yy=0.00012543
        inertia_zz=6.2714e-5 meshes=l_bofoot.vtp
      PinJoint mtp_l: parent_body=calcn_l location_in_parent=(0.16341 -0.0018278 -0.00098704) location=(0 0 0)
        Coordinate mtp_angle_l: motion_type=rotational default_value=0 range=(-1.0472 1.0472) clamped=false
    Body torso: mass=25.7061 mass_center=(-0.02676 0.30651 0) inertia_xx=0.98117 inertia_yy=0.45135 inertia_zz=0.98117
        meshes=(hat_spine.vtp hat_jaw.vtp hat_skull.vtp hat_ribs.vtp)
      CustomJoint back: parent_body=pelvis location_in_parent=(-0.09725 0.078708 0) location=(0 0 0)
        Coordinate lumbar_extension: motion_type=rotational default_value=0 range=(-1.5708 1.5708) clamped=false
        Coordinate lumbar_bending: motion_type=rotational default_value=0 range=(-1.5708 1.5708) clamped=false
        Coordinate lumbar_rotation: motion_type=rotational default_value=0 range=(-1.5708 1.5708) clamped=false
        SpatialTransform: axes_held_at_zero=(translation1 translation2 translation3)
          # 3 Axes for rotations are listed first.
          TransformAxis rotation1: coordinates=lumbar_extension axis=(0 0 1) LinearFunction(coefficients=1 0)
          TransformAxis rotation2: coordinates=lumbar_bending axis=(1 0 0) LinearFunction(coefficients=1 0)
          TransformAxis rotation3: coordinates=lumbar_rotation axis=(0 1 0) LinearFunction(coefficients=1 0)
    Body humerus_r: mass=1.5261 mass_center=(0 -0.16903 0) inertia_xx=0.0094704 inertia_yy=0.003267 inertia_zz=0.01063
        meshes=arm_r_humerus.vtp
      CustomJoint shoulder_r: parent_body=torso location_in_parent=(0.0028143 0.35583 0.15164) location=(0 0 0)
        Coordinate arm_flex_r: motion_type=rotational default_value=0 range=(-3.14 3.14) clamped=false
        Coordinate arm_add_r: motion_type=rotational default_value=0 range=(-3.14 3.14) clamped=false
        Coordinate arm_rot_r: motion_type=rotational default_value=0 range=(-3.14 3.14) clamped=false
        SpatialTransform: axes_held_at_zero=(translation1 translation2 translation3)
          # 3 Axes for rotations are listed first.
          TransformAxis rotation1: coordinates=arm_flex_r axis=(0 0 1) LinearFunction(coefficients=1 0)
          TransformAxis rotation2: coordinates=arm_add_r axis=(1 0 0) LinearFunction(coefficients=1 0)
          TransformAxis rotation3: coordinates=arm_rot_r axis=(0 1 0) LinearFunction(coefficients=1 0)
    Body ulna_r: mass=0.45613 mass_center=(0 -0.11828 0) inertia_xx=0.0021417 inertia_yy=0.00044685
        inertia_zz=0.0023232 meshes=ulna_rv.vtp
      CustomJoint elbow_r: parent_body=humerus_r location_in_parent=(0.013506 -0.29416 -0.0098593) location=(0 0 0)
        Coordinate elbow_flex_r: motion_type=rotational default_value=0 range=(0 2.618) clamped=false
        SpatialTransform: axes_held_at_zero=(rotation2 rotation3 translation1 translation2 translation3)
          # 3 Axes for rotations are listed first.
          TransformAxis rotation1: coordinates=elbow_flex_r axis=(0.22605 0.022269 0.97386)
              LinearFunction(coefficients=1 0)
    Body radius_r: mass=0.45613 mass_center=(0 -0.11828 0) inertia_xx=0.0021417 inertia_yy=0.00044685
        inertia_zz=0.0023232 meshes=radius_rv.vtp
      CustomJoint radioulnar_r: parent_body=ulna_r location_in_parent=(-0.0066014 -0.012764 0.025596) location=(0 0 0)
        Coordinate pro_sup_r: motion_type=rotational default_value=1.51 range=(1.51 2.5708) clamped=false locked=true
        SpatialTransform: axes_held_at_zero=(rotation2 rotation3 translation1 translation2 translation3)
          # 3 Axes for rotations are listed first.
          TransformAxis rotation1: coordinates=pro_sup_r axis=(0.056398 0.99841 0.001952)
              LinearFunction(coefficients=1 0)
    Body hand_r: mass=0.34351 mass_center=(0 -0.066824 0) inertia_xx=0.00064497 inertia_yy=0.00039552
        inertia_zz=0.00096891
        meshes=(pisiform_rvs.vtp lunate_rvs.vtp scaphoid_rvs.vtp triquetrum_rvs.vtp hamate_rvs.vtp capitate_rvs.vtp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)
      CustomJoint radius_hand_r: parent_body=radius_r location_in_parent=(-0.0086328 -0.23144 0.013356)
          location=(0 0 0)
        Coordinate wrist_flex_r: motion_type=rotational default_value=0 range=(-1.2217 1.2217) clamped=false
            locked=true
        Coordinate wrist_dev_r: motion_type=rotational default_value=0 range=(-0.43633 0.61087) clamped=false
            locked=true
        SpatialTransform: axes_held_at_zero=(rotation3 translation1 translation2 translation3)
          # 3 Axes for rotations are listed first.
          TransformAxis rotation1: coordinates=wrist_flex_r axis=(0 0 1) LinearFunction(coefficients=1 0)
          TransformAxis rotation2: coordinates=wrist_dev_r axis=(1 0 0) LinearFunction(coefficients=1 0)
    Body humerus_l: mass=1.5261 mass_center=(0 -0.16903 0) inertia_xx=0.0094704 inertia_yy=0.003267 inertia_zz=0.01063
        meshes=humerus_lv.vtp
      CustomJoint acromial_l: parent_body=torso location_in_parent=(0.0028143 0.35583 -0.15164) location=(0 0 0)
        Coordinate arm_flex_l: motion_type=rotational default_value=0 range=(-3.14 3.14) clamped=false
        Coordinate arm_add_l: motion_type=rotational default_value=0 range=(-3.14 3.14) clamped=false
        Coordinate arm_rot_l: motion_type=rotational default_value=0 range=(-3.14 3.14) clamped=false
        SpatialTransform: axes_held_at_zero=(translation1 translation2 translation3)
          # 3 Axes for rotations are listed first.
          TransformAxis rotation1: coordinates=arm_flex_l axis=(0 0 1) LinearFunction(coefficients=1 0)
          TransformAxis rotation2: coordinates=arm_add_l axis=(-1 0 0) LinearFunction(coefficients=1 0)
          TransformAxis rotation3: coordinates=arm_rot_l axis=(0 -1 0) LinearFunction(coefficients=1 0)
    Body ulna_l: mass=0.45613 mass_center=(0 -0.11828 0) inertia_xx=0.0021417 inertia_yy=0.00044685
        inertia_zz=0.0023232 meshes=ulna_lv.vtp
      CustomJoint elbow_l: parent_body=humerus_l location_in_parent=(0.013506 -0.29416 0.0098593) location=(0 0 0)
        Coordinate elbow_flex_l: motion_type=rotational default_value=0 range=(0 2.618) clamped=false
        SpatialTransform: axes_held_at_zero=(rotation2 rotation3 translation1 translation2 translation3)
          # 3 Axes for rotations are listed first.
          TransformAxis rotation1: coordinates=elbow_flex_l axis=(-0.22605 -0.022269 0.97386)
              LinearFunction(coefficients=1 0)
    Body radius_l: mass=0.45613 mass_center=(0 -0.11828 0) inertia_xx=0.0021417 inertia_yy=0.00044685
        inertia_zz=0.0023232 meshes=radius_lv.vtp
      CustomJoint radioulnar_l: parent_body=ulna_l location_in_parent=(-0.0066014 -0.012764 -0.025596) location=(0 0 0)
        Coordinate pro_sup_l: motion_type=rotational default_value=1.5 range=(1.5 2.5708) clamped=false locked=true
        SpatialTransform: axes_held_at_zero=(rotation2 rotation3 translation1 translation2 translation3)
          # 3 Axes for rotations are listed first.
          TransformAxis rotation1: coordinates=pro_sup_l axis=(-0.056398 -0.99841 0.001952)
              LinearFunction(coefficients=1 0)
    Body hand_l: mass=0.34351 mass_center=(0 -0.066824 0) inertia_xx=0.00064497 inertia_yy=0.00039552
        inertia_zz=0.00096891
        meshes=(pisiform_lvs.vtp lunate_lvs.vtp scaphoid_lvs.vtp triquetrum_lvs.vtp hamate_lvs.vtp capitate_lvs.vtp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)
      CustomJoint radius_hand_l: parent_body=radius_l location_in_parent=(-0.0086328 -0.23144 -0.013356)
          location=(0 0 0)
        Coordinate wrist_flex_l: motion_type=rotational default_value=0 range=(-1.2217 1.2217) clamped=false
            locked=true
        Coordinate wrist_dev_l: motion_type=rotational default_value=0 range=(-0.43633 0.61087) clamped=false
            locked=true
        SpatialTransform: axes_held_at_zero=(rotation3 translation1 translation2 translation3)
          # 3 Axes for rotations are listed first.
          TransformAxis rotation1: coordinates=wrist_flex_l axis=(0 0 1) LinearFunction(coefficients=1 0)
          TransformAxis rotation2: coordinates=wrist_dev_l axis=(-1 0 0) LinearFunction(coefficients=1 0)
  ForceSet:
    Thelen2003Muscle [values shared by the 92 below unless stated]: min_control=0 max_control=1 optimal_force=1
        max_contraction_velocity=10 activation_time_constant=0.01 deactivation_time_constant=0.04
        FmaxTendonStrain=0.033 FmaxMuscleStrain=0.6 KshapeActive=0.5 KshapePassive=4 Af=0.3 Flen=1.8
    Thelen2003Muscle glut_med1_r: max_isometric_force=819 optimal_fiber_length=0.052078 tendon_slack_length=0.075926
        pennation_angle_at_optimal=0.13963
      # Maximum isometric force that the fibers can generate
      # Optimal length of the muscle fibers
      # Resting length of the tendon
      # Angle between tendon and fibers at optimal fiber length expressed in radians
      # Maximum contraction velocity of the fibers, in optimal fiberlengths/second
      # time constant for ramping up muscle activation
      # time constant for ramping down of muscle activation
      # tendon strain at maximum isometric muscle force
      # passive muscle strain at maximum isometric muscle force
      # shape factor for Gaussian active muscle force-length relationship
      # exponential shape factor for passive force-length relationship
      # force-velocity shape factor
      # The set of points defining the path
      # The wrap objecs that are associated with this path
      PathPoint P1: pelvis (-0.039402 0.029358 0.11921)
      PathPoint P2: femur_r (-0.02186 -0.011732 0.055652)
    Thelen2003Muscle glut_med2_r: max_isometric_force=573 optimal_fiber_length=0.0824 tendon_slack_length=0.051683
        pennation_angle_at_optimal=0
      # Maximum isometric force that the fibers can generate
      # Optimal length of the muscle fibers
      # Resting length of the tendon
      # Angle between tendon and fibers at optimal fiber length expressed in radians
      # Maximum contraction velocity of the fibers, in optimal fiberlengths/second
      # time constant for ramping up muscle activation
      # time constant for ramping down of muscle activation
      # tendon strain at maximum isometric muscle force
      # passive muscle strain at maximum isometric muscle force
      # shape factor for Gaussian active muscle force-length relationship
      # exponential shape factor for passive force-length relationship
      # force-velocity shape factor
      # The set of points defining the path
      # The wrap objecs that are associated with this path
      PathPoint P1: pelvis (-0.082571 0.042975 0.075527)
      PathPoint P2: femur_r (-0.025871 -0.0058159 0.052845)
    Thelen2003Muscle glut_med3_r: max_isometric_force=653 optimal_fiber_length=0.063219 tendon_slack_length=0.051867
        pennation_angle_at_optimal=0.33161
      # Maximum isometric force that the fibers can generate
      # Optimal length of the muscle fibers
      # Resting length of the tendon
      # Angle between tendon and fibers at optimal fiber length expressed in radians
      # Maximum contraction velocity of the fibers, in optimal fiberlengths/second
      # time constant for ramping up muscle activation
      # time constant for ramping down of muscle activation
      # tendon strain at maximum isometric muscle force
      # passive muscle strain at maximum isometric muscle force
      # shape factor for Gaussian active muscle force-length relationship
      # exponential shape factor for passive force-length relationship
      # force-velocity shape factor
      # The set of points defining the path
      # The wrap objecs that are associated with this path
      PathPoint P1: pelvis (-0.11811 0.01014 0.063893)
      PathPoint P2: femur_r (-0.030985 -0.0047129 0.051942)
    Thelen2003Muscle glut_min1_r: max_isometric_force=270 optimal_fiber_length=0.066574 tendon_slack_length=0.015665
        pennation_angle_at_optimal=0.17453
      # Maximum isometric force that the fibers can generate
      # Optimal length of the muscle fibers
      # Resting length of the tendon
      # Angle between tendon and fibers at optimal fiber length expressed in radians
      # Maximum contraction velocity of the fibers, in optimal fiberlengths/second
      # time constant for ramping up muscle activation
      # time constant for ramping down of muscle activation
      # tendon strain at maximum isometric muscle force
      # passive muscle strain at maximum isometric muscle force
      # shape factor for Gaussian active muscle force-length relationship
      # exponential shape factor for passive force-length relationship
      # force-velocity shape factor
      # The set of points defining the path
      # The wrap objecs that are associated with this path
      PathPoint P1: pelvis (-0.0451 -0.0077259 0.10412)
      PathPoint P2: femur_r (-0.0072198 -0.010429 0.056154)
    Thelen2003Muscle glut_min2_r: max_isometric_force=285 optimal_fiber_length=0.054942 tendon_slack_length=0.025509
        pennation_angle_at_optimal=0
      # Maximum isometric force that the fibers can generate
      # Optimal length of the muscle fibers
      # Resting length of the tendon
      # Angle between tendon and fibers at optimal fiber length expressed in radians
      # Maximum contraction velocity of the fibers, in optimal fiberlengths/second
      # time constant for ramping up muscle activation
      # time constant for ramping down of muscle activation
      # tendon strain at maximum isometric muscle force
      # passive muscle strain at maximum isometric muscle force
      # shape factor for Gaussian active muscle force-length relationship
      # exponential shape factor for passive force-length relationship
      # force-velocity shape factor
      # The set of points defining the path
      # The wrap objecs that are associated with this path
      PathPoint P1: pelvis (-0.061131 -0.0062773 0.097712)
      PathPoint P2: femur_r (-0.0096264 -0.010429 0.056154)
    Thelen2003Muscle glut_min3_r: max_isometric_force=323 optimal_fiber_length=0.037351 tendon_slack_length=0.050129
        pennation_angle_at_optimal=0.017453
      # Maximum isometric force that the fibers can generate
      # Optimal length of the muscle fibers
      # Resting length of the tendon
      # Angle between tendon and fibers at optimal fiber length expressed in radians
      # Maximum contraction velocity of the fibers, in optimal fiberlengths/second
      # time constant for ramping up muscle activation
      # time constant for ramping down of muscle activation
      # tendon strain at maximum isometric muscle force
      # passive muscle strain at maximum isometric muscle force
      # shape factor for Gaussian active muscle force-length relationship
      # exponential shape factor for passive force-length relationship
      # force-velocity shape factor
      # The set of points defining the path
      # The wrap objecs that are associated with this path
      PathPoint P1: pelvis (-0.080543 -0.0060842 0.084401)
      PathPoint P2: femur_r (-0.013537 -0.0083228 0.055151)
    Thelen2003Muscle semimem_r: max_isometric_force=1288 optimal_fiber_length=0.080093 tendon_slack_length=0.35942
        pennation_angle_at_optimal=0.2618
      # Maximum isometric force that the fibers can generate
      # Optimal length of the muscle fibers
      # Resting length of the tendon
      # Angle between tendon and fibers at optimal fiber length expressed in radians
      # Maximum contraction velocity of the fibers, in optimal fiberlengths/second
      # time constant for ramping up muscle activation
      # time constant for ramping down of muscle activation
      # tendon strain at maximum isometric muscle force
      # passive muscle strain at maximum isometric muscle force
      # shape factor for Gaussian active muscle force-length relationship
      # exponential shape factor for passive force-length relationship
      # force-velocity shape factor
      # The set of points defining the path
      # The wrap objecs that are associated with this path
      PathPoint P1: pelvis (-0.11512 -0.094131 0.070509)
      PathPoint P3: tibia_r (-0.026102 -0.046123 -0.018919)
      ConditionalPathPoint P2: tibia_r (-0.033642 -0.034019 -0.018281) range=(-0.55851 0.17453) coordinate=knee_angle_r
    Thelen2003Muscle semiten_r: max_isometric_force=410 optimal_fiber_length=0.20051 tendon_slack_length=0.25488
        pennation_angle_at_optimal=0.087266
      # Maximum isometric force that the fibers can generate
      # Optimal length of the muscle fibers
      # Resting length of the tendon
      # Angle between tendon and fibers at optimal fiber length expressed in radians
      # Maximum contraction velocity of the fibers, in optimal fiberlengths/second
      # time constant for ramping up muscle activation
      # time constant for ramping down of muscle activation
      # tendon strain at maximum isometric muscle force
      # passive muscle strain at maximum isometric muscle force
      # shape factor for Gaussian active muscle force-length relationship
      # exponential shape factor for passive force-length relationship
      # force-velocity shape factor
      # The set of points defining the path
      # The wrap objecs that are associated with this path
      PathPoint P1: pelvis (-0.12202 -0.10612 0.059544)
      PathPoint P3: tibia_r (-0.032115 -0.051063 -0.022119)
      PathPoint P4: tibia_r (-0.010924 -0.072118 -0.023685)
      PathPoint P5: tibia_r (0.0026102 -0.09242 -0.018658)
      ConditionalPathPoint P2: tibia_r (-0.040632 -0.027639 -0.022013) range=(-0.33161 0.17453) coordinate=knee_angle_r
    Thelen2003Muscle bifemlh_r: max_isometric_force=896 optimal_fiber_length=0.10906 tendon_slack_length=0.32618
        pennation_angle_at_optimal=0
      # Maximum isometric force that the fibers can generate
      # Optimal length of the muscle fibers
      # Resting length of the tendon
      # Angle between tendon and fibers at optimal fiber length expressed in radians
      # Maximum contraction velocity of the fibers, in optimal fiberlengths/second
      # time constant for ramping up muscle activation
      # time constant for ramping down of muscle activation
      # tendon strain at maximum isometric muscle force
      # passive muscle strain at maximum isometric muscle force
      # shape factor for Gaussian active muscle force-length relationship
      # exponential shape factor for passive force-length relationship
      # force-velocity shape factor
      # The set of points defining the path
      # The wrap objecs that are associated with this path
      PathPoint P1: pelvis (-0.12165 -0.099056 0.068468)
      PathPoint P2: tibia_r (-0.029099 -0.034802 0.028451)
      PathPoint P3: tibia_r (-0.022621 -0.054427 0.033159)
    Thelen2003Muscle bifemsh_r: max_isometric_force=804 optimal_fiber_length=0.17187 tendon_slack_length=0.08842
        pennation_angle_at_optimal=0.40143
      # Maximum isometric force that the fibers can generate
      # Optimal length of the muscle fibers
      # Resting length of the tendon
      # Angle between tendon and fibers at optimal fiber length expressed in radians
      # Maximum contraction velocity of the fibers, in optimal fiberlengths/second
      # time constant for ramping up muscle activation
      # time constant for ramping down of muscle activation
      # tendon strain at maximum isometric muscle force
      # passive muscle strain at maximum isometric muscle force
      # shape factor for Gaussian active muscle force-length relationship
      # exponential shape factor for passive force-length relationship
      # force-velocity shape factor
      # The set of points defining the path
      # The wrap objecs that are associated with this path
      PathPoint P1: femur_r (0.0050137 -0.21168 0.023464)
      PathPoint P2: tibia_r (-0.029099 -0.034802 0.028451)
      PathPoint P3: tibia_r (-0.022621 -0.054427 0.033159)
    Thelen2003Muscle sar_r: max_isometric_force=156 optimal_fiber_length=0.5158 tendon_slack_length=0.099192
        pennation_angle_at_optimal=0
      # Maximum isometric force that the fibers can generate
      # Optimal length of the muscle fibers
      # Resting length of the tendon
      # Angle between tendon and fibers at optimal fiber length expressed in radians
      # Maximum contraction velocity of the fibers, in optimal fiberlengths/second
      # time constant for ramping up muscle activation
      # time constant for ramping down of muscle activation
      # tendon strain at maximum isometric muscle force
      # passive muscle strain at maximum isometric muscle force
      # shape factor for Gaussian active muscle force-length relationship
      # exponential shape factor for passive force-length relationship
      # force-velocity shape factor
      # The set of points defining the path
      # The wrap objecs that are associated with this path
      PathPoint P1: pelvis (-0.014776 -0.0012555 0.12246)
      PathPoint P2: femur_r (-0.0030082 -0.35778 -0.042216)
      PathPoint P3: tibia_r (-0.0054137 -0.040506 -0.038573)
      PathPoint P4: tibia_r (0.0058004 -0.05694 -0.037026)
      PathPoint P5: tibia_r (0.023492 -0.081205 -0.024362)
    Thelen2003Muscle add_long_r: max_isometric_force=627 optimal_fiber_length=0.13831 tendon_slack_length=0.11025
        pennation_angle_at_optimal=0.10472
      # Maximum isometric force that the fibers can generate
      # Optimal length of the muscle fibers
      # Resting length of the tendon
      # Angle between tendon and fibers at optimal fiber length expressed in radians
      # Maximum contraction velocity of the fibers, in optimal fiberlengths/second
      # time constant for ramping up muscle activation
      # time constant for ramping down of muscle activation
      # tendon strain at maximum isometric muscle force
      # passive muscle strain at maximum isometric muscle force
      # shape factor for Gaussian active muscle force-length relationship
      # exponential shape factor for passive force-length relationship
      # force-velocity shape factor
      # The set of points defining the path
      # The wrap objecs that are associated with this path
      PathPoint P1: pelvis (-0.030517 -0.080736 0.016663)
      PathPoint P2: femur_r (0.0050137 -0.21168 0.023464)
    Thelen2003Muscle add_brev_r: max_isometric_force=429 optimal_fiber_length=0.13319 tendon_slack_length=0.020029
        pennation_angle_at_optimal=0
      # Maximum isometric force that the fibers can generate
      # Optimal length of the muscle fibers
      # Resting length of the tendon
      # Angle between tendon and fibers at optimal fiber length expressed in radians
      # Maximum contraction velocity of the fibers, in optimal fiberlengths/second
      # time constant for ramping up muscle activation
      # time constant for ramping down of muscle activation
      # tendon strain at maximum isometric muscle force
      # passive muscle strain at maximum isometric muscle force
      # shape factor for Gaussian active muscle force-length relationship
      # exponential shape factor for passive force-length relationship
      # force-velocity shape factor
      # The set of points defining the path
      # The wrap objecs that are associated with this path
      PathPoint P1: pelvis (-0.056689 -0.088365 0.01617)
      PathPoint P2: femur_r (0.00090247 -0.11993 0.029481)
    Thelen2003Muscle add_mag1_r: max_isometric_force=381 optimal_fiber_length=0.087537 tendon_slack_length=0.06037
        pennation_angle_at_optimal=0.087266
      # Maximum isometric force that the fibers can generate
      # Optimal length of the muscle fibers
      # Resting length of the tendon
      # Angle between tendon and fibers at optimal fiber length expressed in radians
      # Maximum contraction velocity of the fibers, in optimal fiberlengths/second
      # time constant for ramping up muscle activation
      # time constant for ramping down of muscle activation
      # tendon strain at maximum isometric muscle force
      # passive muscle strain at maximum isometric muscle force
      # shape factor for Gaussian active muscle force-length relationship
      # exponential shape factor for passive force-length relationship
      # force-velocity shape factor
      # The set of points defining the path
      # The wrap objecs that are associated with this path
      PathPoint P1: pelvis (-0.070692 -0.11338 0.025143)
      PathPoint P2: femur_r (-0.0045124 -0.12143 0.033993)
    Thelen2003Muscle add_mag2_r: max_isometric_force=343 optimal_fiber_length=0.12223 tendon_slack_length=0.12122
        pennation_angle_at_optimal=0.05236
      # Maximum isometric force that the fibers can generate
      # Optimal length of the muscle fibers
      # Resting length of the tendon
      # Angle between tendon and fibers at optimal fiber length expressed in radians
      # Maximum contraction velocity of the fibers, in optimal fiberlengths/second
      # time constant for ramping up muscle activation
      # time constant for ramping down of muscle activation
      # tendon strain at maximum isometric muscle force
      # passive muscle strain at maximum isometric muscle force
      # shape factor for Gaussian active muscle force-length relationship
      # exponential shape factor for passive force-length relationship
      # force-velocity shape factor
      # The set of points defining the path
      # The wrap objecs that are associated with this path
      PathPoint P1: pelvis (-0.080253 -0.11512 0.030369)
      PathPoint P2: femur_r (0.0054148 -0.22913 0.022762)
    Thelen2003Muscle add_mag3_r: max_isometric_force=488 optimal_fiber_length=0.13196 tendon_slack_length=0.25082
        pennation_angle_at_optimal=0.087266
      # Maximum isometric force that the fibers can generate
      # Optimal length of the muscle fibers
      # Resting length of the tendon
      # Angle between tendon and fibers at optimal fiber length expressed in radians
      # Maximum contraction velocity of the fibers, in optimal fiberlengths/second
      # time constant for ramping up muscle activation
      # time constant for ramping down of muscle activation
      # tendon strain at maximum isometric muscle force
      # passive muscle strain at maximum isometric muscle force
      # shape factor for Gaussian active muscle force-length relationship
      # exponential shape factor for passive force-length relationship
      # force-velocity shape factor
      # The set of points defining the path
      # The wrap objecs that are associated with this path
      PathPoint P1: pelvis (-0.10727 -0.11022 0.048136)
      PathPoint P2: femur_r (0.0070192 -0.38475 -0.026673)
    Thelen2003Muscle tfl_r: max_isometric_force=233 optimal_fiber_length=0.09442 tendon_slack_length=0.42241
        pennation_angle_at_optimal=0.05236
      # Maximum isometric force that the fibers can generate
      # Optimal length of the muscle fibers
      # Resting length of the tendon
      # Angle between tendon and fibers at optimal fiber length expressed in radians
      # Maximum contraction velocity of the fibers, in optimal fiberlengths/second
      # time constant for ramping up muscle activation
      # time constant for ramping down of muscle activation
      # tendon strain at maximum isometric muscle force
      # passive muscle strain at maximum isometric muscle force
      # shape factor for Gaussian active muscle force-length relationship
      # exponential shape factor for passive force-length relationship
      # force-velocity shape factor
      # The set of points defining the path
      # The wrap objecs that are associated with this path
      PathPoint P1: pelvis (-0.030034 0.020667 0.12236)
      PathPoint P2: femur_r (0.029481 -0.099773 0.059864)
      PathPoint P3: femur_r (0.0054148 -0.40601 0.035798)
      PathPoint P4: tibia_r (0.0058004 -0.04708 0.028712)
    Thelen2003Muscle pect_r: max_isometric_force=266 optimal_fiber_length=0.099785 tendon_slack_length=0.032929
        pennation_angle_at_optimal=0
      # Maximum isometric force that the fibers can generate
      # Optimal length of the muscle fibers
      # Resting length of the tendon
      # Angle between tendon and fibers at optimal fiber length expressed in radians
      # Maximum contraction velocity of the fibers, in optimal fiberlengths/second
      # time constant for ramping up muscle activation
      # time constant for ramping down of muscle activation
      # tendon strain at maximum isometric muscle force
      # passive muscle strain at maximum isometric muscle force
      # shape factor for Gaussian active muscle force-length relationship
      # exponential shape factor for passive force-length relationship
      # force-velocity shape factor
      # The set of points defining the path
      # The wrap objecs that are associated with this path
      PathPoint P1: pelvis (-0.041623 -0.074169 0.044468)
      PathPoint P2: femur_r (-0.012233 -0.082426 0.025369)
    Thelen2003Muscle grac_r: max_isometric_force=162 optimal_fiber_length=0.35173 tendon_slack_length=0.1259
        pennation_angle_at_optimal=0.05236
      # Maximum isometric force that the fibers can generate
      # Optimal length of the muscle fibers
      # Resting length of the tendon
      # Angle between tendon and fibers at optimal fiber length expressed in radians
      # Maximum contraction velocity of the fibers, in optimal fiberlengths/second
      # time constant for ramping up muscle activation
      # time constant for ramping down of muscle activation
      # tendon strain at maximum isometric muscle force
      # passive muscle strain at maximum isometric muscle force
      # shape factor for Gaussian active muscle force-length relationship
      # exponential shape factor for passive force-length relationship
      # force-velocity shape factor
      # The set of points defining the path
      # The wrap objecs that are associated with this path
      PathPoint P1: pelvis (-0.071474 -0.11463 0.027549)
      PathPoint P3: tibia_r (-0.018784 -0.049816 -0.034609)
      PathPoint P4: tibia_r (0.0058004 -0.080819 -0.022041)
      ConditionalPathPoint P2: tibia_r (-0.025686 -0.030839 -0.036485) range=(-0.43633 0.17453) coordinate=knee_angle_r
    Thelen2003Muscle glut_max1_r: max_isometric_force=573 optimal_fiber_length=0.13899 tendon_slack_length=0.12235
        pennation_angle_at_optimal=0.087266
      # Maximum isometric force that the fibers can generate
      # Optimal length of the muscle fibers
      # Resting length of the tendon
      # Angle between tendon and fibers at optimal fiber length expressed in radians
      # Maximum contraction velocity of the fibers, in optimal fiberlengths/second
      # time constant for ramping up muscle activation
      # time constant for ramping down of muscle activation
      # tendon strain at maximum isometric muscle force
      # passive muscle strain at maximum isometric muscle force
      # shape factor for Gaussian active muscle force-length relationship
      # exponential shape factor for passive force-length relationship
      # force-velocity shape factor
      # The set of points defining the path
      # The wrap objecs that are associated with this path
      PathPoint P1: pelvis (-0.11541 0.059103 0.06902)
      PathPoint P2: pelvis (-0.12468 0.0011589 0.087359)
      PathPoint P3: femur_r (-0.045825 -0.024868 0.039308)
      PathPoint P4: femur_r (-0.027776 -0.056755 0.047129)
    Thelen2003Muscle glut_max2_r: max_isometric_force=819 optimal_fiber_length=0.14476 tendon_slack_length=0.12506
        pennation_angle_at_optimal=0
      # Maximum isometric force that the fibers can generate
      # Optimal length of the muscle fibers
      # Resting length of the tendon
      # Angle between tendon and fibers at optimal fiber length expressed in radians
      # Maximum contraction velocity of the fibers, in optimal fiberlengths/second
      # time constant for ramping up muscle activation
      # time constant for ramping down of muscle activation
      # tendon strain at maximum isometric muscle force
      # passive muscle strain at maximum isometric muscle force
      # shape factor for Gaussian active muscle force-length relationship
      # exponential shape factor for passive force-length relationship
      # force-velocity shape factor
      # The set of points defining the path
      # The wrap objecs that are associated with this path
      PathPoint P1: pelvis (-0.13028 0.016997 0.055512)
      PathPoint P2: pelvis (-0.13289 -0.050218 0.09012)
      PathPoint P3: femur_r (-0.042717 -0.053145 0.02938)
      PathPoint P4: femur_r (-0.015643 -0.10188 0.042015)
    Thelen2003Muscle glut_max3_r: max_isometric_force=552 optimal_fiber_length=0.14212 tendon_slack_length=0.1431
        pennation_angle_at_optimal=0.087266
      # Maximum isometric force that the fibers can generate
      # Optimal length of the muscle fibers
      # Resting length of the tendon
      # Angle between tendon and fibers at optimal fiber length expressed in radians
      # Maximum contraction velocity of the fibers, in optimal fiberlengths/second
      # time constant for ramping up muscle activation
      # time constant for ramping down of muscle activation
      # tendon strain at maximum isometric muscle force
      # passive muscle strain at maximum isometric muscle force
      # shape factor for Gaussian active muscle force-length relationship
      # exponential shape factor for passive force-length relationship
      # force-velocity shape factor
      # The set of points defining the path
      # The wrap objecs that are associated with this path
      PathPoint P1: pelvis (-0.15027 -0.030324 0.0057188)
      PathPoint P2: pelvis (-0.14766 -0.1016 0.039736)
      PathPoint P3: femur_r (-0.029982 -0.10439 0.013537)
      PathPoint P4: femur_r (-0.0060165 -0.14229 0.041213)
    Thelen2003Muscle iliacus_r: max_isometric_force=1073 optimal_fiber_length=0.097678 tendon_slack_length=0.097678
        pennation_angle_at_optimal=0.12217
      # Maximum isometric force that the fibers can generate
      # Optimal length of the muscle fibers
      # Resting length of the tendon
      # Angle between tendon and fibers at optimal fiber length expressed in radians
      # Maximum contraction velocity of the fibers, in optimal fiberlengths/second
      # time constant for ramping up muscle activation
      # time constant for ramping down of muscle activation
      # tendon strain at maximum isometric muscle force
      # passive muscle strain at maximum isometric muscle force
      # shape factor for Gaussian active muscle force-length relationship
      # exponential shape factor for passive force-length relationship
      # force-velocity shape factor
      # The set of points defining the path
      # The wrap objecs that are associated with this path
      PathPoint P1: pelvis (-0.065091 0.03525 0.084204)
      PathPoint P2: pelvis (-0.024916 -0.053116 0.079964)
      PathPoint P4: femur_r (0.0017047 -0.054449 0.0057157)
      PathPoint P5: femur_r (-0.019353 -0.06227 0.012935)
      ConditionalPathPoint P3: pelvis (-0.027813 -0.077742 0.080457) range=(-1.5708 0.7854) coordinate=hip_flexion_r
    Thelen2003Muscle psoas_r: max_isometric_force=1113 optimal_fiber_length=0.0975 tendon_slack_length=0.156
        pennation_angle_at_optimal=0.13963
      # Maximum isometric force that the fibers can generate
      # Optimal length of the muscle fibers
      # Resting length of the tendon
      # Angle between tendon and fibers at optimal fiber length expressed in radians
      # Maximum contraction velocity of the fibers, in optimal fiberlengths/second
      # time constant for ramping up muscle activation
      # time constant for ramping down of muscle activation
      # tendon strain at maximum isometric muscle force
      # passive muscle strain at maximum isometric muscle force
      # shape factor for Gaussian active muscle force-length relationship
      # exponential shape factor for passive force-length relationship
      # force-velocity shape factor
      # The set of points defining the path
      # The wrap objecs that are associated with this path
      PathPoint P1: pelvis (-0.062483 0.085661 0.028495)
      PathPoint P2: pelvis (-0.022985 -0.055047 0.074837)
      PathPoint P4: femur_r (0.0016044 -0.050839 0.0038104)
      PathPoint P5: femur_r (-0.018852 -0.059864 0.010429)
      ConditionalPathPoint P3: pelvis (-0.027813 -0.077742 0.080457) range=(-1.5708 0.7854) coordinate=hip_flexion_r
    Thelen2003Muscle quad_fem_r: max_isometric_force=381 optimal_fiber_length=0.053413 tendon_slack_length=0.023739
        pennation_angle_at_optimal=0
      # Maximum isometric force that the fibers can generate
      # Optimal length of the muscle fibers
      # Resting length of the tendon
      # Angle between tendon and fibers at optimal fiber length expressed in radians
      # Maximum contraction velocity of the fibers, in optimal fiberlengths/second
      # time constant for ramping up muscle activation
      # time constant for ramping down of muscle activation
      # tendon strain at maximum isometric muscle force
      # passive muscle strain at maximum isometric muscle force
      # shape factor for Gaussian active muscle force-length relationship
      # exponential shape factor for passive force-length relationship
      # force-velocity shape factor
      # The set of points defining the path
      # The wrap objecs that are associated with this path
      PathPoint P1: pelvis (-0.11038 -0.11116 0.051272)
      PathPoint P2: femur_r (-0.038205 -0.035999 0.0367)
    Thelen2003Muscle gem_r: max_isometric_force=164 optimal_fiber_length=0.023703 tendon_slack_length=0.038518
        pennation_angle_at_optimal=0
      # Maximum isometric force that the fibers can generate
      # Optimal length of the muscle fibers
      # Resting length of the tendon
      # Angle between tendon and fibers at optimal fiber length expressed in radians
      # Maximum contraction velocity of the fibers, in optimal fiberlengths/second
      # time constant for ramping up muscle activation
      # time constant for ramping down of muscle activation
      # tendon strain at maximum isometric muscle force
      # passive muscle strain at maximum isometric muscle force
      # shape factor for Gaussian active muscle force-length relationship
      # exponential shape factor for passive force-length relationship
      # force-velocity shape factor
      # The set of points defining the path
      # The wrap objecs that are associated with this path
      PathPoint P1: pelvis (-0.10942 -0.079191 0.0704)
      PathPoint P2: femur_r (-0.014239 -0.0033091 0.044422)
    Thelen2003Muscle peri_r: max_isometric_force=444 optimal_fiber_length=0.025492 tendon_slack_length=0.11275
        pennation_angle_at_optimal=0.17453
      # Maximum isometric force that the fibers can generate
      # Optimal length of the muscle fibers
      # Resting length of the tendon
      # Angle between tendon and fibers at optimal fiber length expressed in radians
      # Maximum contraction velocity of the fibers, in optimal fiberlengths/second
      # time constant for ramping up muscle activation
      # time constant for ramping down of muscle activation
      # tendon strain at maximum isometric muscle force
      # passive muscle strain at maximum isometric muscle force
      # shape factor for Gaussian active muscle force-length relationship
      # exponential shape factor for passive force-length relationship
      # force-velocity shape factor
      # The set of points defining the path
      # The wrap objecs that are associated with this path
      PathPoint P1: pelvis (-0.13482 0.00028972 0.023171)
      PathPoint P2: pelvis (-0.11521 -0.026654 0.06478)
      PathPoint P3: femur_r (-0.014841 -0.0036099 0.04382)
    Thelen2003Muscle rect_fem_r: max_isometric_force=1169 optimal_fiber_length=0.11415 tendon_slack_length=0.31042
        pennation_angle_at_optimal=0.087266
      # Maximum isometric force that the fibers can generate
      # Optimal length of the muscle fibers
      # Resting length of the tendon
      # Angle between tendon and fibers at optimal fiber length expressed in radians
      # Maximum contraction velocity of the fibers, in optimal fiberlengths/second
      # time constant for ramping up muscle activation
      # time constant for ramping down of muscle activation
      # tendon strain at maximum isometric muscle force
      # passive muscle strain at maximum isometric muscle force
      # shape factor for Gaussian active muscle force-length relationship
      # exponential shape factor for passive force-length relationship
      # force-velocity shape factor
      # The set of points defining the path
      # The wrap objecs that are associated with this path
      PathPoint P1: pelvis (-0.028489 -0.030034 0.095444)
      ConditionalPathPoint P2: femur_r (0.033492 -0.40411 0.0019052) range=(-2.618 -1.46) coordinate=knee_angle_r
      MovingPathPoint P3: tibia_r (0.050045 0.022245 0.0013534) x_coordinate=knee_angle_r y_coordinate=knee_angle_r
          z_coordinate=knee_angle_r
        x_location: MultiplierFunction: scale=0.96673
          SimmSpline: x=(-2.0944 -2 -1.5708 -1.4575 -1.3963 -1.0472 -0.69813 -0.52639 -0.34907 -0.17453 0 0.00017453 0.00034907 0.027925 0.087266 0.17453 2.0944)
              y=(0.015581 0.017994 0.027508 0.029656 0.030762 0.036569 0.042207 0.04509 0.048391 0.05343 0.061758 0.061767 0.061776 0.063308 0.066994 0.073303 0.057348)
        y_location: MultiplierFunction: scale=0.96673
          SimmSpline: x=(-2.0944 -2 -1.5708 -1.4575 -1.3963 -1.0472 -0.69813 -0.52639 -0.34907 -0.17453 0 0.00017453 0.00034907 0.027925 0.087266 0.17453 2.0944)
              y=(0.023412 0.023761 0.025114 0.025279 0.025315 0.024918 0.024237 0.023845 0.02342 0.022764 0.020984 0.020981 0.020979 0.020522 0.019175 0.015955 -0.067377)
        z_location: MultiplierFunction: scale=0.96673
          SimmSpline: x=(-2.0944 0.1745) y=(0.0014 0.0014)
    Thelen2003Muscle vas_med_r: max_isometric_force=1294 optimal_fiber_length=0.089444 tendon_slack_length=0.12663
        pennation_angle_at_optimal=0.087266
      # Maximum isometric force that the fibers can generate
      # Optimal length of the muscle fibers
      # Resting length of the tendon
      # Angle between tendon and fibers at optimal fiber length expressed in radians
      # Maximum contraction velocity of the fibers, in optimal fiberlengths/second
      # time constant for ramping up muscle activation
      # time constant for ramping down of muscle activation
      # tendon strain at maximum isometric muscle force
      # passive muscle strain at maximum isometric muscle force
      # shape factor for Gaussian active muscle force-length relationship
      # exponential shape factor for passive force-length relationship
      # force-velocity shape factor
      # The set of points defining the path
      # The wrap objecs that are associated with this path
      PathPoint P1: femur_r (0.014038 -0.21048 0.018852)
      PathPoint P2: femur_r (0.035698 -0.27766 0.00090247)
      ConditionalPathPoint P3: femur_r (0.037102 -0.40591 -0.012534) range=(-2.618 -1.21) coordinate=knee_angle_r
      ConditionalPathPoint P4: femur_r (0.027475 -0.42667 -0.013136) range=(-2.618 -1.7801) coordinate=knee_angle_r
      MovingPathPoint P5: tibia_r (0.044393 0.021964 -0.014114) x_coordinate=knee_angle_r y_coordinate=knee_angle_r
          z_coordinate=knee_angle_r
        x_location: MultiplierFunction: scale=0.96673
          SimmSpline: x=(-2.0944 -2 -1.5708 -1.4575 -1.3963 -1.0472 -0.69813 -0.52639 -0.34907 -0.17453 0 0.00017453 0.00034907 0.027925 0.087266 0.17453 2.0944)
              y=(0.009811 0.012224 0.021737 0.023885 0.02499 0.030796 0.036419 0.039287 0.042565 0.047576 0.055959 0.055968 0.055978 0.057542 0.061337 0.06795 0.062933)
        y_location: MultiplierFunction: scale=0.96673
          SimmSpline: x=(-2.0944 -2 -1.5708 -1.4575 -1.3963 -1.0472 -0.69813 -0.52639 -0.34907 -0.17453 0 0.00017453 0.00034907 0.027925 0.087266 0.17453 2.0944)
              y=(0.022415 0.022765 0.024126 0.024293 0.024329 0.023946 0.023359 0.023068 0.022834 0.022636 0.021792 0.02179 0.021789 0.021537 0.020684 0.018327 -0.06562)
        z_location: MultiplierFunction: scale=0.96673
          SimmSpline: x=(-2.0944 2.0944) y=(-0.0146 -0.0146)
    Thelen2003Muscle vas_int_r: max_isometric_force=1365 optimal_fiber_length=0.087576 tendon_slack_length=0.1369
        pennation_angle_at_optimal=0.05236
      # Maximum isometric force that the fibers can generate
      # Optimal length of the muscle fibers
      # Resting length of the tendon
      # Angle between tendon and fibers at optimal fiber length expressed in radians
      # Maximum contraction velocity of the fibers, in optimal fiberlengths/second
      # time constant for ramping up muscle activation
      # time constant for ramping down of muscle activation
      # tendon strain at maximum isometric muscle force
      # passive muscle strain at maximum isometric muscle force
      # shape factor for Gaussian active muscle force-length relationship
      # exponential shape factor for passive force-length relationship
      # force-velocity shape factor
      # The set of points defining the path
      # The wrap objecs that are associated with this path
      PathPoint P1: femur_r (0.02908 -0.19293 0.031085)
      PathPoint P2: femur_r (0.033592 -0.20897 0.028578)
      ConditionalPathPoint P3: femur_r (0.034394 -0.40411 0.0055151) range=(-2.618 -1.42) coordinate=knee_angle_r
      MovingPathPoint P4: tibia_r (0.043294 0.025204 0.0017401) x_coordinate=knee_angle_r y_coordinate=knee_angle_r
          z_coordinate=knee_angle_r
        x_location: MultiplierFunction: scale=0.96673
          SimmSpline: x=(-2.0944 -2 -1.5708 -1.4575 -1.3963 -1.0472 -0.69813 -0.52639 -0.34907 -0.17453 0 0.00017453 0.00034907 0.027925 0.087266 0.17453 2.0944)
              y=(0.0082733 0.010687 0.020204 0.022353 0.023458 0.029271 0.034946 0.037871 0.041257 0.046529 0.055463 0.055474 0.055484 0.057172 0.061272 0.068437 0.064882)
        y_location: MultiplierFunction: scale=0.96673
          SimmSpline: x=(-2.0944 -2 -1.5708 -1.4575 -1.3963 -1.0472 -0.69813 -0.52639 -0.34907 -0.17453 0 0.00017453 0.00034907 0.027925 0.087266 0.17453 2.0944)
              y=(0.025599 0.025949 0.027312 0.02748 0.027515 0.027136 0.026574 0.026307 0.026119 0.026013 0.025292 0.025291 0.02529 0.025053 0.024219 0.021829 -0.068571)
        z_location: MultiplierFunction: scale=0.96673
          SimmSpline: x=(-2.0944 2.0944) y=(0.0018 0.0018)
    Thelen2003Muscle vas_lat_r: max_isometric_force=1871 optimal_fiber_length=0.084361 tendon_slack_length=0.15767
        pennation_angle_at_optimal=0.087266
      # Maximum isometric force that the fibers can generate
      # Optimal length of the muscle fibers
      # Resting length of the tendon
      # Angle between tendon and fibers at optimal fiber length expressed in radians
      # Maximum contraction velocity of the fibers, in optimal fiberlengths/second
      # time constant for ramping up muscle activation
      # time constant for ramping down of muscle activation
      # tendon strain at maximum isometric muscle force
      # passive muscle strain at maximum isometric muscle force
      # shape factor for Gaussian active muscle force-length relationship
      # exponential shape factor for passive force-length relationship
      # force-velocity shape factor
      # The set of points defining the path
      # The wrap objecs that are associated with this path
      PathPoint P1: femur_r (0.0048132 -0.18591 0.034996)
      PathPoint P2: femur_r (0.026974 -0.25981 0.041012)
      ConditionalPathPoint P3: femur_r (0.036199 -0.40411 0.020556) range=(-2.618 -1.21) coordinate=knee_angle_r
      ConditionalPathPoint P4: femur_r (0.025369 -0.42546 0.018451) range=(-2.618 -1.92) coordinate=knee_angle_r
      MovingPathPoint P5: tibia_r (0.048585 0.020593 0.015951) x_coordinate=knee_angle_r y_coordinate=knee_angle_r
          z_coordinate=knee_angle_r
        x_location: MultiplierFunction: scale=0.96673
          SimmSpline: x=(-2.0944 -2 -1.5708 -1.4575 -1.3963 -1.0472 -0.69813 -0.52639 -0.34907 -0.17453 0 0.00017453 0.00034907 0.027925 0.087266 0.17453 2.0944)
              y=(0.01429 0.016703 0.026215 0.028362 0.029467 0.035271 0.040878 0.043729 0.04697 0.051874 0.059956 0.059965 0.059974 0.061458 0.065035 0.071187 0.058377)
        y_location: MultiplierFunction: scale=0.96673
          SimmSpline: x=(-2.0944 -2 -1.5708 -1.4575 -1.3963 -1.0472 -0.69813 -0.52639 -0.34907 -0.17453 0 0.00017453 0.00034907 0.027925 0.087266 0.17453 2.0944)
              y=(0.021532 0.021882 0.023236 0.023402 0.023437 0.023044 0.022384 0.022015 0.021636 0.021097 0.019586 0.019584 0.019582 0.01919 0.018008 0.015107 -0.065342)
        z_location: MultiplierFunction: scale=0.96673
          SimmSpline: x=(-2.0944 2.0944) y=(0.0165 0.0165)
    Thelen2003Muscle med_gas_r: max_isometric_force=1558 optimal_fiber_length=0.057951 tendon_slack_length=0.37668
        pennation_angle_at_optimal=0.29671
      # Maximum isometric force that the fibers can generate
      # Optimal length of the muscle fibers
      # Resting length of the tendon
      # Angle between tendon and fibers at optimal fiber length expressed in radians
      # Maximum contraction velocity of the fibers, in optimal fiberlengths/second
      # time constant for ramping up muscle activation
      # time constant for ramping down of muscle activation
      # tendon strain at maximum isometric muscle force
      # passive muscle strain at maximum isometric muscle force
      # shape factor for Gaussian active muscle force-length relationship
      # exponential shape factor for passive force-length relationship
      # force-velocity shape factor
      # The set of points defining the path
      # The wrap objecs that are associated with this path
      PathPoint P1: femur_r (-0.019052 -0.39398 -0.023564)
      PathPoint P3: calcn_r (0 0.028332 -0.0048438)
      ConditionalPathPoint P2: femur_r (-0.030082 -0.4033 -0.025871) range=(-0.7854 0.17453) coordinate=knee_angle_r
    Thelen2003Muscle lat_gas_r: max_isometric_force=683 optimal_fiber_length=0.061798 tendon_slack_length=0.36692
        pennation_angle_at_optimal=0.13963
      # Maximum isometric force that the fibers can generate
      # Optimal length of the muscle fibers
      # Resting length of the tendon
      # Angle between tendon and fibers at optimal fiber length expressed in radians
      # Maximum contraction velocity of the fibers, in optimal fiberlengths/second
      # time constant for ramping up muscle activation
      # time constant for ramping down of muscle activation
      # tendon strain at maximum isometric muscle force
      # passive muscle strain at maximum isometric muscle force
      # shape factor for Gaussian active muscle force-length relationship
      # exponential shape factor for passive force-length relationship
      # force-velocity shape factor
      # The set of points defining the path
      # The wrap objecs that are associated with this path
      PathPoint P1: femur_r (-0.02206 -0.39568 0.027275)
      PathPoint P3: calcn_r (0 0.028332 -0.0048438)
      ConditionalPathPoint P2: femur_r (-0.030082 -0.4029 0.027475) range=(-0.7854 0.17453) coordinate=knee_angle_r
    Thelen2003Muscle soleus_r: max_isometric_force=3549 optimal_fiber_length=0.048171 tendon_slack_length=0.24085
        pennation_angle_at_optimal=0.43633
      # Maximum isometric force that the fibers can generate
      # Optimal length of the muscle fibers
      # Resting length of the tendon
      # Angle between tendon and fibers at optimal fiber length expressed in radians
      # Maximum contraction velocity of the fibers, in optimal fiberlengths/second
      # time constant for ramping up muscle activation
      # time constant for ramping down of muscle activation
      # tendon strain at maximum isometric muscle force
      # passive muscle strain at maximum isometric muscle force
      # shape factor for Gaussian active muscle force-length relationship
      # exponential shape factor for passive force-length relationship
      # force-velocity shape factor
      # The set of points defining the path
      # The wrap objecs that are associated with this path
      PathPoint P1: tibia_r (-0.0023202 -0.1482 0.0068638)
      PathPoint P2: calcn_r (0 0.028332 -0.0048438)
    Thelen2003Muscle tib_post_r: max_isometric_force=1588 optimal_fiber_length=0.029757 tendon_slack_length=0.29757
        pennation_angle_at_optimal=0.20944
      # Maximum isometric force that the fibers can generate
      # Optimal length of the muscle fibers
      # Resting length of the tendon
      # Angle between tendon and fibers at optimal fiber length expressed in radians
      # Maximum contraction velocity of the fibers, in optimal fiberlengths/second
      # time constant for ramping up muscle activation
      # time constant for ramping down of muscle activation
      # tendon strain at maximum isometric muscle force
      # passive muscle strain at maximum isometric muscle force
      # shape factor for Gaussian active muscle force-length relationship
      # exponential shape factor for passive force-length relationship
      # force-velocity shape factor
      # The set of points defining the path
      # The wrap objecs that are associated with this path
      PathPoint P1: tibia_r (-0.0090873 -0.13031 0.0018368)
      PathPoint P2: tibia_r (-0.013921 -0.39162 -0.022138)
      PathPoint P3: calcn_r (0.038111 0.030525 -0.026138)
      PathPoint P4: calcn_r (0.070555 0.014531 -0.025681)
    Thelen2003Muscle flex_dig_r: max_isometric_force=310 optimal_fiber_length=0.032025 tendon_slack_length=0.37677
        pennation_angle_at_optimal=0.12217
      # Maximum isometric force that the fibers can generate
      # Optimal length of the muscle fibers
      # Resting length of the tendon
      # Angle between tendon and fibers at optimal fiber length expressed in radians
      # Maximum contraction velocity of the fibers, in optimal fiberlengths/second
      # time constant for ramping up muscle activation
      # time constant for ramping down of muscle activation
      # tendon strain at maximum isometric muscle force
      # passive muscle strain at maximum isometric muscle force
      # shape factor for Gaussian active muscle force-length relationship
      # exponential shape factor for passive force-length relationship
      # force-velocity shape factor
      # The set of points defining the path
      # The wrap objecs that are associated with this path
      PathPoint P1: tibia_r (-0.0080239 -0.19779 -0.0017401)
      PathPoint P2: tibia_r (-0.014888 -0.39162 -0.018948)
      PathPoint P3: calcn_r (0.039847 0.028789 -0.02559)
      PathPoint P4: calcn_r (0.064706 0.016085 -0.024036)
      PathPoint P5: calcn_r (0.15153 -0.0074028 0.010601)
      PathPoint P6: toes_r (-0.0017365 -0.0071286 0.013435)
      PathPoint P7: toes_r (0.026047 -0.0064889 0.019649)
      PathPoint P8: toes_r (0.040304 -0.0054836 0.022117)
    Thelen2003Muscle flex_hal_r: max_isometric_force=322 optimal_fiber_length=0.040412 tendon_slack_length=0.35713
        pennation_angle_at_optimal=0.17453
      # Maximum isometric force that the fibers can generate
      # Optimal length of the muscle fibers
      # Resting length of the tendon
      # Angle between tendon and fibers at optimal fiber length expressed in radians
      # Maximum contraction velocity of the fibers, in optimal fiberlengths/second
      # time constant for ramping up muscle activation
      # time constant for ramping down of muscle activation
      # tendon strain at maximum isometric muscle force
      # passive muscle strain at maximum isometric muscle force
      # shape factor for Gaussian active muscle force-length relationship
      # exponential shape factor for passive force-length relationship
      # force-velocity shape factor
      # The set of points defining the path
      # The wrap objecs that are associated with this path
      PathPoint P1: tibia_r (-0.0076372 -0.22564 0.023588)
      PathPoint P2: tibia_r (-0.017981 -0.39433 -0.016821)
      PathPoint P3: calcn_r (0.034181 0.025224 -0.022026)
      PathPoint P4: calcn_r (0.094865 0.0062147 -0.023397)
      PathPoint P5: calcn_r (0.15774 -0.0048438 -0.024585)
      PathPoint P6: toes_r (0.014166 -0.0058491 -0.024219)
      PathPoint P7: toes_r (0.051363 -0.009322 -0.016542)
    Thelen2003Muscle tib_ant_r: max_isometric_force=905 optimal_fiber_length=0.09379 tendon_slack_length=0.21342
        pennation_angle_at_optimal=0.087266
      # Maximum isometric force that the fibers can generate
      # Optimal length of the muscle fibers
      # Resting length of the tendon
      # Angle between tendon and fibers at optimal fiber length expressed in radians
      # Maximum contraction velocity of the fibers, in optimal fiberlengths/second
      # time constant for ramping up muscle activation
      # time constant for ramping down of muscle activation
      # tendon strain at maximum isometric muscle force
      # passive muscle strain at maximum isometric muscle force
      # shape factor for Gaussian active muscle force-length relationship
      # exponential shape factor for passive force-length relationship
      # force-velocity shape factor
      # The set of points defining the path
      # The wrap objecs that are associated with this path
      PathPoint P1: tibia_r (0.017305 -0.157 0.011117)
      PathPoint P2: tibia_r (0.031806 -0.38196 -0.017111)
      PathPoint P3: calcn_r (0.10656 0.016268 -0.027875)
    Thelen2003Muscle per_brev_r: max_isometric_force=435 optimal_fiber_length=0.04788 tendon_slack_length=0.15417
        pennation_angle_at_optimal=0.087266
      # Maximum isometric force that the fibers can generate
      # Optimal length of the muscle fibers
      # Resting length of the tendon
      # Angle between tendon and fibers at optimal fiber length expressed in radians
      # Maximum contraction velocity of the fibers, in optimal fiberlengths/second
      # time constant for ramping up muscle activation
      # time constant for ramping down of muscle activation
      # tendon strain at maximum isometric muscle force
      # passive muscle strain at maximum isometric muscle force
      # shape factor for Gaussian active muscle force-length relationship
      # exponential shape factor for passive force-length relationship
      # force-velocity shape factor
      # The set of points defining the path
      # The wrap objecs that are associated with this path
      PathPoint P1: tibia_r (-0.0067671 -0.2558 0.031419)
      PathPoint P2: tibia_r (-0.019141 -0.40448 0.027359)
      PathPoint P3: tibia_r (-0.013921 -0.41521 0.027939)
      PathPoint P4: calcn_r (0.043046 0.024676 0.021294)
      PathPoint P5: calcn_r (0.061873 0.020015 0.031348)
    Thelen2003Muscle per_long_r: max_isometric_force=943 optimal_fiber_length=0.04664 tendon_slack_length=0.32838
        pennation_angle_at_optimal=0.17453
      # Maximum isometric force that the fibers can generate
      # Optimal length of the muscle fibers
      # Resting length of the tendon
      # Angle between tendon and fibers at optimal fiber length expressed in radians
      # Maximum contraction velocity of the fibers, in optimal fiberlengths/second
      # time constant for ramping up muscle activation
      # time constant for ramping down of muscle activation
      # tendon strain at maximum isometric muscle force
      # passive muscle strain at maximum isometric muscle force
      # shape factor for Gaussian active muscle force-length relationship
      # exponential shape factor for passive force-length relationship
      # force-velocity shape factor
      # The set of points defining the path
      # The wrap objecs that are associated with this path
      PathPoint P1: tibia_r (0.00048337 -0.15158 0.034996)
      PathPoint P2: tibia_r (-0.020011 -0.40651 0.027648)
      PathPoint P3: tibia_r (-0.015661 -0.41753 0.027939)
      PathPoint P4: calcn_r (0.04003 0.02102 0.020198)
      PathPoint P5: calcn_r (0.062238 0.0096876 0.025955)
      PathPoint P6: calcn_r (0.077866 0.0063061 0.010784)
      PathPoint P7: calcn_r (0.10995 0.0077684 -0.016816)
    Thelen2003Muscle per_tert_r: max_isometric_force=180 optimal_fiber_length=0.075372 tendon_slack_length=0.095407
        pennation_angle_at_optimal=0.22689
      # Maximum isometric force that the fibers can generate
      # Optimal length of the muscle fibers
      # Resting length of the tendon
      # Angle between tendon and fibers at optimal fiber length expressed in radians
      # Maximum contraction velocity of the fibers, in optimal fiberlengths/second
      # time constant for ramping up muscle activation
      # time constant for ramping down of muscle activation
      # tendon strain at maximum isometric muscle force
      # passive muscle strain at maximum isometric muscle force
      # shape factor for Gaussian active muscle force-length relationship
      # exponential shape factor for passive force-length relationship
      # force-velocity shape factor
      # The set of points defining the path
      # The wrap objecs that are associated with this path
      PathPoint P1: tibia_r (0.00096673 -0.27107 0.022332)
      PathPoint P2: tibia_r (0.022138 -0.39336 0.015371)
      PathPoint P3: calcn_r (0.078323 0.020837 0.027326)
    Thelen2003Muscle ext_dig_r: max_isometric_force=512 optimal_fiber_length=0.096643 tendon_slack_length=0.32688
        pennation_angle_at_optimal=0.13963
      # Maximum isometric force that the fibers can generate
      # Optimal length of the muscle fibers
      # Resting length of the tendon
      # Angle between tendon and fibers at optimal fiber length expressed in radians
      # Maximum contraction velocity of the fibers, in optimal fiberlengths/second
      # time constant for ramping up muscle activation
      # time constant for ramping down of muscle activation
      # tendon strain at maximum isometric muscle force
      # passive muscle strain at maximum isometric muscle force
      # shape factor for Gaussian active muscle force-length relationship
      # exponential shape factor for passive force-length relationship
      # force-velocity shape factor
      # The set of points defining the path
      # The wrap objecs that are associated with this path
      PathPoint P1: tibia_r (0.0030935 -0.13351 0.026682)
      PathPoint P2: tibia_r (0.027939 -0.38737 0.0069605)
      PathPoint P3: calcn_r (0.084264 0.03546 -9.1392e-5)
      PathPoint P4: calcn_r (0.14769 0.0050266 0.011881)
      PathPoint P5: toes_r (0.00027418 0.0042954 0.013983)
      PathPoint P6: toes_r (0.040487 -0.00036557 0.022848)
    Thelen2003Muscle ext_hal_r: max_isometric_force=162 optimal_fiber_length=0.1049 tendon_slack_length=0.28825
        pennation_angle_at_optimal=0.10472
      # Maximum isometric force that the fibers can generate
      # Optimal length of the muscle fibers
      # Resting length of the tendon
      # Angle between tendon and fibers at optimal fiber length expressed in radians
      # Maximum contraction velocity of the fibers, in optimal fiberlengths/second
      # time constant for ramping up muscle activation
      # time constant for ramping down of muscle activation
      # tendon strain at maximum isometric muscle force
      # passive muscle strain at maximum isometric muscle force
      # shape factor for Gaussian active muscle force-length relationship
      # exponential shape factor for passive force-length relationship
      # force-velocity shape factor
      # The set of points defining the path
      # The wrap objecs that are associated with this path
      PathPoint P1: tibia_r (0.0011601 -0.17082 0.022041)
      PathPoint P2: tibia_r (0.031516 -0.38524 -0.0082172)
      PathPoint P3: calcn_r (0.088651 0.035552 -0.019284)
      PathPoint P4: calcn_r (0.11817 0.02824 -0.023488)
      PathPoint P5: calcn_r (0.15847 0.012703 -0.02559)
      PathPoint P6: toes_r (0.027235 0.0037471 -0.022391)
      PathPoint P7: toes_r (0.051454 0.0031073 -0.016999)
    Thelen2003Muscle glut_med1_l: max_isometric_force=819 optimal_fiber_length=0.052078 tendon_slack_length=0.075926
        pennation_angle_at_optimal=0.13963
      # Maximum isometric force that the fibers can generate
      # Optimal length of the muscle fibers
      # Resting length of the tendon
      # Angle between tendon and fibers at optimal fiber length expressed in radians
      # Maximum contraction velocity of the fibers, in optimal fiberlengths/second
      # time constant for ramping up muscle activation
      # time constant for ramping down of muscle activation
      # tendon strain at maximum isometric muscle force
      # passive muscle strain at maximum isometric muscle force
      # shape factor for Gaussian active muscle force-length relationship
      # exponential shape factor for passive force-length relationship
      # force-velocity shape factor
      # The set of points defining the path
      # The wrap objecs that are associated with this path
      PathPoint P1: pelvis (-0.039402 0.029358 -0.11921)
      PathPoint P2: femur_l (-0.02186 -0.011732 -0.055652)
    Thelen2003Muscle glut_med2_l: max_isometric_force=573 optimal_fiber_length=0.0824 tendon_slack_length=0.051683
        pennation_angle_at_optimal=0
      # Maximum isometric force that the fibers can generate
      # Optimal length of the muscle fibers
      # Resting length of the tendon
      # Angle between tendon and fibers at optimal fiber length expressed in radians
      # Maximum contraction velocity of the fibers, in optimal fiberlengths/second
      # time constant for ramping up muscle activation
      # time constant for ramping down of muscle activation
      # tendon strain at maximum isometric muscle force
      # passive muscle strain at maximum isometric muscle force
      # shape factor for Gaussian active muscle force-length relationship
      # exponential shape factor for passive force-length relationship
      # force-velocity shape factor
      # The set of points defining the path
      # The wrap objecs that are associated with this path
      PathPoint P1: pelvis (-0.082571 0.042975 -0.075527)
      PathPoint P2: femur_l (-0.025871 -0.0058159 -0.052845)
    Thelen2003Muscle glut_med3_l: max_isometric_force=653 optimal_fiber_length=0.063219 tendon_slack_length=0.051867
        pennation_angle_at_optimal=0.33161
      # Maximum isometric force that the fibers can generate
      # Optimal length of the muscle fibers
      # Resting length of the tendon
      # Angle between tendon and fibers at optimal fiber length expressed in radians
      # Maximum contraction velocity of the fibers, in optimal fiberlengths/second
      # time constant for ramping up muscle activation
      # time constant for ramping down of muscle activation
      # tendon strain at maximum isometric muscle force
      # passive muscle strain at maximum isometric muscle force
      # shape factor for Gaussian active muscle force-length relationship
      # exponential shape factor for passive force-length relationship
      # force-velocity shape factor
      # The set of points defining the path
      # The wrap objecs that are associated with this path
      PathPoint P1: pelvis (-0.11811 0.01014 -0.063893)
      PathPoint P2: femur_l (-0.030985 -0.0047129 -0.051942)
    Thelen2003Muscle glut_min1_l: max_isometric_force=270 optimal_fiber_length=0.066574 tendon_slack_length=0.015665
        pennation_angle_at_optimal=0.17453
      # Maximum isometric force that the fibers can generate
      # Optimal length of the muscle fibers
      # Resting length of the tendon
      # Angle between tendon and fibers at optimal fiber length expressed in radians
      # Maximum contraction velocity of the fibers, in optimal fiberlengths/second
      # time constant for ramping up muscle activation
      # time constant for ramping down of muscle activation
      # tendon strain at maximum isometric muscle force
      # passive muscle strain at maximum isometric muscle force
      # shape factor for Gaussian active muscle force-length relationship
      # exponential shape factor for passive force-length relationship
      # force-velocity shape factor
      # The set of points defining the path
      # The wrap objecs that are associated with this path
      PathPoint P1: pelvis (-0.0451 -0.0077259 -0.10412)
      PathPoint P2: femur_l (-0.0072198 -0.010429 -0.056154)
    Thelen2003Muscle glut_min2_l: max_isometric_force=285 optimal_fiber_length=0.054942 tendon_slack_length=0.025509
        pennation_angle_at_optimal=0
      # Maximum isometric force that the fibers can generate
      # Optimal length of the muscle fibers
      # Resting length of the tendon
      # Angle between tendon and fibers at optimal fiber length expressed in radians
      # Maximum contraction velocity of the fibers, in optimal fiberlengths/second
      # time constant for ramping up muscle activation
      # time constant for ramping down of muscle activation
      # tendon strain at maximum isometric muscle force
      # passive muscle strain at maximum isometric muscle force
      # shape factor for Gaussian active muscle force-length relationship
      # exponential shape factor for passive force-length relationship
      # force-velocity shape factor
      # The set of points defining the path
      # The wrap objecs that are associated with this path
      PathPoint P1: pelvis (-0.061131 -0.0062773 -0.097712)
      PathPoint P2: femur_l (-0.0096264 -0.010429 -0.056154)
    Thelen2003Muscle glut_min3_l: max_isometric_force=323 optimal_fiber_length=0.037351 tendon_slack_length=0.050129
        pennation_angle_at_optimal=0.017453
      # Maximum isometric force that the fibers can generate
      # Optimal length of the muscle fibers
      # Resting length of the tendon
      # Angle between tendon and fibers at optimal fiber length expressed in radians
      # Maximum contraction velocity of the fibers, in optimal fiberlengths/second
      # time constant for ramping up muscle activation
      # time constant for ramping down of muscle activation
      # tendon strain at maximum isometric muscle force
      # passive muscle strain at maximum isometric muscle force
      # shape factor for Gaussian active muscle force-length relationship
      # exponential shape factor for passive force-length relationship
      # force-velocity shape factor
      # The set of points defining the path
      # The wrap objecs that are associated with this path
      PathPoint P1: pelvis (-0.080543 -0.0060842 -0.084401)
      PathPoint P2: femur_l (-0.013537 -0.0083228 -0.055151)
    Thelen2003Muscle semimem_l: max_isometric_force=1288 optimal_fiber_length=0.080093 tendon_slack_length=0.35942
        pennation_angle_at_optimal=0.2618
      # Maximum isometric force that the fibers can generate
      # Optimal length of the muscle fibers
      # Resting length of the tendon
      # Angle between tendon and fibers at optimal fiber length expressed in radians
      # Maximum contraction velocity of the fibers, in optimal fiberlengths/second
      # time constant for ramping up muscle activation
      # time constant for ramping down of muscle activation
      # tendon strain at maximum isometric muscle force
      # passive muscle strain at maximum isometric muscle force
      # shape factor for Gaussian active muscle force-length relationship
      # exponential shape factor for passive force-length relationship
      # force-velocity shape factor
      # The set of points defining the path
      # The wrap objecs that are associated with this path
      PathPoint P1: pelvis (-0.11512 -0.094131 -0.070509)
      PathPoint P3: tibia_l (-0.026102 -0.046123 0.018919)
      ConditionalPathPoint P2: tibia_l (-0.033642 -0.034019 0.018281) range=(-0.55851 0.17453) coordinate=knee_angle_l
    Thelen2003Muscle semiten_l: max_isometric_force=410 optimal_fiber_length=0.20051 tendon_slack_length=0.25488
        pennation_angle_at_optimal=0.087266
      # Maximum isometric force that the fibers can generate
      # Optimal length of the muscle fibers
      # Resting length of the tendon
      # Angle between tendon and fibers at optimal fiber length expressed in radians
      # Maximum contraction velocity of the fibers, in optimal fiberlengths/second
      # time constant for ramping up muscle activation
      # time constant for ramping down of muscle activation
      # tendon strain at maximum isometric muscle force
      # passive muscle strain at maximum isometric muscle force
      # shape factor for Gaussian active muscle force-length relationship
      # exponential shape factor for passive force-length relationship
      # force-velocity shape factor
      # The set of points defining the path
      # The wrap objecs that are associated with this path
      PathPoint P1: pelvis (-0.12202 -0.10612 -0.059544)
      PathPoint P3: tibia_l (-0.032115 -0.051063 0.022119)
      PathPoint P4: tibia_l (-0.010924 -0.072118 0.023685)
      PathPoint P5: tibia_l (0.0026102 -0.09242 0.018658)
      ConditionalPathPoint P2: tibia_l (-0.040632 -0.027639 0.022013) range=(-0.33161 0.17453) coordinate=knee_angle_l
    Thelen2003Muscle bifemlh_l: max_isometric_force=896 optimal_fiber_length=0.10906 tendon_slack_length=0.32618
        pennation_angle_at_optimal=0
      # Maximum isometric force that the fibers can generate
      # Optimal length of the muscle fibers
      # Resting length of the tendon
      # Angle between tendon and fibers at optimal fiber length expressed in radians
      # Maximum contraction velocity of the fibers, in optimal fiberlengths/second
      # time constant for ramping up muscle activation
      # time constant for ramping down of muscle activation
      # tendon strain at maximum isometric muscle force
      # passive muscle strain at maximum isometric muscle force
      # shape factor for Gaussian active muscle force-length relationship
      # exponential shape factor for passive force-length relationship
      # force-velocity shape factor
      # The set of points defining the path
      # The wrap objecs that are associated with this path
      PathPoint P1: pelvis (-0.12165 -0.099056 -0.068468)
      PathPoint P2: tibia_l (-0.029099 -0.034802 -0.028451)
      PathPoint P3: tibia_l (-0.022621 -0.054427 -0.033159)
    Thelen2003Muscle bifemsh_l: max_isometric_force=804 optimal_fiber_length=0.17187 tendon_slack_length=0.08842
        pennation_angle_at_optimal=0.40143
      # Maximum isometric force that the fibers can generate
      # Optimal length of the muscle fibers
      # Resting length of the tendon
      # Angle between tendon and fibers at optimal fiber length expressed in radians
      # Maximum contraction velocity of the fibers, in optimal fiberlengths/second
      # time constant for ramping up muscle activation
      # time constant for ramping down of muscle activation
      # tendon strain at maximum isometric muscle force
      # passive muscle strain at maximum isometric muscle force
      # shape factor for Gaussian active muscle force-length relationship
      # exponential shape factor for passive force-length relationship
      # force-velocity shape factor
      # The set of points defining the path
      # The wrap objecs that are associated with this path
      PathPoint P1: femur_l (0.0050137 -0.21168 -0.023464)
      PathPoint P2: tibia_l (-0.029099 -0.034802 -0.028451)
      PathPoint P3: tibia_l (-0.022621 -0.054427 -0.033159)
    Thelen2003Muscle sar_l: max_isometric_force=156 optimal_fiber_length=0.5158 tendon_slack_length=0.099192
        pennation_angle_at_optimal=0
      # Maximum isometric force that the fibers can generate
      # Optimal length of the muscle fibers
      # Resting length of the tendon
      # Angle between tendon and fibers at optimal fiber length expressed in radians
      # Maximum contraction velocity of the fibers, in optimal fiberlengths/second
      # time constant for ramping up muscle activation
      # time constant for ramping down of muscle activation
      # tendon strain at maximum isometric muscle force
      # passive muscle strain at maximum isometric muscle force
      # shape factor for Gaussian active muscle force-length relationship
      # exponential shape factor for passive force-length relationship
      # force-velocity shape factor
      # The set of points defining the path
      # The wrap objecs that are associated with this path
      PathPoint P1: pelvis (-0.014776 -0.0012555 -0.12246)
      PathPoint P2: femur_l (-0.0030082 -0.35778 0.042216)
      PathPoint P3: tibia_l (-0.0054137 -0.040506 0.038573)
      PathPoint P4: tibia_l (0.0058004 -0.05694 0.037026)
      PathPoint P5: tibia_l (0.023492 -0.081205 0.024362)
    Thelen2003Muscle add_long_l: max_isometric_force=627 optimal_fiber_length=0.13831 tendon_slack_length=0.11025
        pennation_angle_at_optimal=0.10472
      # Maximum isometric force that the fibers can generate
      # Optimal length of the muscle fibers
      # Resting length of the tendon
      # Angle between tendon and fibers at optimal fiber length expressed in radians
      # Maximum contraction velocity of the fibers, in optimal fiberlengths/second
      # time constant for ramping up muscle activation
      # time constant for ramping down of muscle activation
      # tendon strain at maximum isometric muscle force
      # passive muscle strain at maximum isometric muscle force
      # shape factor for Gaussian active muscle force-length relationship
      # exponential shape factor for passive force-length relationship
      # force-velocity shape factor
      # The set of points defining the path
      # The wrap objecs that are associated with this path
      PathPoint P1: pelvis (-0.030517 -0.080736 -0.016663)
      PathPoint P2: femur_l (0.0050137 -0.21168 -0.023464)
    Thelen2003Muscle add_brev_l: max_isometric_force=429 optimal_fiber_length=0.13319 tendon_slack_length=0.020029
        pennation_angle_at_optimal=0
      # Maximum isometric force that the fibers can generate
      # Optimal length of the muscle fibers
      # Resting length of the tendon
      # Angle between tendon and fibers at optimal fiber length expressed in radians
      # Maximum contraction velocity of the fibers, in optimal fiberlengths/second
      # time constant for ramping up muscle activation
      # time constant for ramping down of muscle activation
      # tendon strain at maximum isometric muscle force
      # passive muscle strain at maximum isometric muscle force
      # shape factor for Gaussian active muscle force-length relationship
      # exponential shape factor for passive force-length relationship
      # force-velocity shape factor
      # The set of points defining the path
      # The wrap objecs that are associated with this path
      PathPoint P1: pelvis (-0.056689 -0.088365 -0.01617)
      PathPoint P2: femur_l (0.00090247 -0.11993 -0.029481)
    Thelen2003Muscle add_mag1_l: max_isometric_force=381 optimal_fiber_length=0.087537 tendon_slack_length=0.06037
        pennation_angle_at_optimal=0.087266
      # Maximum isometric force that the fibers can generate
      # Optimal length of the muscle fibers
      # Resting length of the tendon
      # Angle between tendon and fibers at optimal fiber length expressed in radians
      # Maximum contraction velocity of the fibers, in optimal fiberlengths/second
      # time constant for ramping up muscle activation
      # time constant for ramping down of muscle activation
      # tendon strain at maximum isometric muscle force
      # passive muscle strain at maximum isometric muscle force
      # shape factor for Gaussian active muscle force-length relationship
      # exponential shape factor for passive force-length relationship
      # force-velocity shape factor
      # The set of points defining the path
      # The wrap objecs that are associated with this path
      PathPoint P1: pelvis (-0.070692 -0.11338 -0.025143)
      PathPoint P2: femur_l (-0.0045124 -0.12143 -0.033993)
    Thelen2003Muscle add_mag2_l: max_isometric_force=343 optimal_fiber_length=0.12223 tendon_slack_length=0.12122
        pennation_angle_at_optimal=0.05236
      # Maximum isometric force that the fibers can generate
      # Optimal length of the muscle fibers
      # Resting length of the tendon
      # Angle between tendon and fibers at optimal fiber length expressed in radians
      # Maximum contraction velocity of the fibers, in optimal fiberlengths/second
      # time constant for ramping up muscle activation
      # time constant for ramping down of muscle activation
      # tendon strain at maximum isometric muscle force
      # passive muscle strain at maximum isometric muscle force
      # shape factor for Gaussian active muscle force-length relationship
      # exponential shape factor for passive force-length relationship
      # force-velocity shape factor
      # The set of points defining the path
      # The wrap objecs that are associated with this path
      PathPoint P1: pelvis (-0.080253 -0.11512 -0.030369)
      PathPoint P2: femur_l (0.0054148 -0.22913 -0.022762)
    Thelen2003Muscle add_mag3_l: max_isometric_force=488 optimal_fiber_length=0.13196 tendon_slack_length=0.25082
        pennation_angle_at_optimal=0.087266
      # Maximum isometric force that the fibers can generate
      # Optimal length of the muscle fibers
      # Resting length of the tendon
      # Angle between tendon and fibers at optimal fiber length expressed in radians
      # Maximum contraction velocity of the fibers, in optimal fiberlengths/second
      # time constant for ramping up muscle activation
      # time constant for ramping down of muscle activation
      # tendon strain at maximum isometric muscle force
      # passive muscle strain at maximum isometric muscle force
      # shape factor for Gaussian active muscle force-length relationship
      # exponential shape factor for passive force-length relationship
      # force-velocity shape factor
      # The set of points defining the path
      # The wrap objecs that are associated with this path
      PathPoint P1: pelvis (-0.10727 -0.11022 -0.048136)
      PathPoint P2: femur_l (0.0070192 -0.38475 0.026673)
    Thelen2003Muscle tfl_l: max_isometric_force=233 optimal_fiber_length=0.09442 tendon_slack_length=0.42241
        pennation_angle_at_optimal=0.05236
      # Maximum isometric force that the fibers can generate
      # Optimal length of the muscle fibers
      # Resting length of the tendon
      # Angle between tendon and fibers at optimal fiber length expressed in radians
      # Maximum contraction velocity of the fibers, in optimal fiberlengths/second
      # time constant for ramping up muscle activation
      # time constant for ramping down of muscle activation
      # tendon strain at maximum isometric muscle force
      # passive muscle strain at maximum isometric muscle force
      # shape factor for Gaussian active muscle force-length relationship
      # exponential shape factor for passive force-length relationship
      # force-velocity shape factor
      # The set of points defining the path
      # The wrap objecs that are associated with this path
      PathPoint P1: pelvis (-0.030034 0.020667 -0.12236)
      PathPoint P2: femur_l (0.029481 -0.099773 -0.059864)
      PathPoint P3: femur_l (0.0054148 -0.40601 -0.035798)
      PathPoint P4: tibia_l (0.0058004 -0.04708 -0.028712)
    Thelen2003Muscle pect_l: max_isometric_force=266 optimal_fiber_length=0.099785 tendon_slack_length=0.032929
        pennation_angle_at_optimal=0
      # Maximum isometric force that the fibers can generate
      # Optimal length of the muscle fibers
      # Resting length of the tendon
      # Angle between tendon and fibers at optimal fiber length expressed in radians
      # Maximum contraction velocity of the fibers, in optimal fiberlengths/second
      # time constant for ramping up muscle activation
      # time constant for ramping down of muscle activation
      # tendon strain at maximum isometric muscle force
      # passive muscle strain at maximum isometric muscle force
      # shape factor for Gaussian active muscle force-length relationship
      # exponential shape factor for passive force-length relationship
      # force-velocity shape factor
      # The set of points defining the path
      # The wrap objecs that are associated with this path
      PathPoint P1: pelvis (-0.041623 -0.074169 -0.044468)
      PathPoint P2: femur_l (-0.012233 -0.082426 -0.025369)
    Thelen2003Muscle grac_l: max_isometric_force=162 optimal_fiber_length=0.35173 tendon_slack_length=0.1259
        pennation_angle_at_optimal=0.05236
      # Maximum isometric force that the fibers can generate
      # Optimal length of the muscle fibers
      # Resting length of the tendon
      # Angle between tendon and fibers at optimal fiber length expressed in radians
      # Maximum contraction velocity of the fibers, in optimal fiberlengths/second
      # time constant for ramping up muscle activation
      # time constant for ramping down of muscle activation
      # tendon strain at maximum isometric muscle force
      # passive muscle strain at maximum isometric muscle force
      # shape factor for Gaussian active muscle force-length relationship
      # exponential shape factor for passive force-length relationship
      # force-velocity shape factor
      # The set of points defining the path
      # The wrap objecs that are associated with this path
      PathPoint P1: pelvis (-0.071474 -0.11463 -0.027549)
      PathPoint P3: tibia_l (-0.018784 -0.049816 0.034609)
      PathPoint P4: tibia_l (0.0058004 -0.080819 0.022041)
      ConditionalPathPoint P2: tibia_l (-0.025686 -0.030839 0.036485) range=(-0.43633 0.17453) coordinate=knee_angle_l
    Thelen2003Muscle glut_max1_l: max_isometric_force=573 optimal_fiber_length=0.13899 tendon_slack_length=0.12235
        pennation_angle_at_optimal=0.087266
      # Maximum isometric force that the fibers can generate
      # Optimal length of the muscle fibers
      # Resting length of the tendon
      # Angle between tendon and fibers at optimal fiber length expressed in radians
      # Maximum contraction velocity of the fibers, in optimal fiberlengths/second
      # time constant for ramping up muscle activation
      # time constant for ramping down of muscle activation
      # tendon strain at maximum isometric muscle force
      # passive muscle strain at maximum isometric muscle force
      # shape factor for Gaussian active muscle force-length relationship
      # exponential shape factor for passive force-length relationship
      # force-velocity shape factor
      # The set of points defining the path
      # The wrap objecs that are associated with this path
      PathPoint P1: pelvis (-0.11541 0.059103 -0.06902)
      PathPoint P2: pelvis (-0.12468 0.0011589 -0.087359)
      PathPoint P3: femur_l (-0.045825 -0.024868 -0.039308)
      PathPoint P4: femur_l (-0.027776 -0.056755 -0.047129)
    Thelen2003Muscle glut_max2_l: max_isometric_force=819 optimal_fiber_length=0.14476 tendon_slack_length=0.12506
        pennation_angle_at_optimal=0
      # Maximum isometric force that the fibers can generate
      # Optimal length of the muscle fibers
      # Resting length of the tendon
      # Angle between tendon and fibers at optimal fiber length expressed in radians
      # Maximum contraction velocity of the fibers, in optimal fiberlengths/second
      # time constant for ramping up muscle activation
      # time constant for ramping down of muscle activation
      # tendon strain at maximum isometric muscle force
      # passive muscle strain at maximum isometric muscle force
      # shape factor for Gaussian active muscle force-length relationship
      # exponential shape factor for passive force-length relationship
      # force-velocity shape factor
      # The set of points defining the path
      # The wrap objecs that are associated with this path
      PathPoint P1: pelvis (-0.13028 0.016997 -0.055512)
      PathPoint P2: pelvis (-0.13289 -0.050218 -0.09012)
      PathPoint P3: femur_l (-0.042717 -0.053145 -0.02938)
      PathPoint P4: femur_l (-0.015643 -0.10188 -0.042015)
    Thelen2003Muscle glut_max3_l: max_isometric_force=552 optimal_fiber_length=0.14212 tendon_slack_length=0.1431
        pennation_angle_at_optimal=0.087266
      # Maximum isometric force that the fibers can generate
      # Optimal length of the muscle fibers
      # Resting length of the tendon
      # Angle between tendon and fibers at optimal fiber length expressed in radians
      # Maximum contraction velocity of the fibers, in optimal fiberlengths/second
      # time constant for ramping up muscle activation
      # time constant for ramping down of muscle activation
      # tendon strain at maximum isometric muscle force
      # passive muscle strain at maximum isometric muscle force
      # shape factor for Gaussian active muscle force-length relationship
      # exponential shape factor for passive force-length relationship
      # force-velocity shape factor
      # The set of points defining the path
      # The wrap objecs that are associated with this path
      PathPoint P1: pelvis (-0.15027 -0.030324 -0.0057188)
      PathPoint P2: pelvis (-0.14766 -0.1016 -0.039736)
      PathPoint P3: femur_l (-0.029982 -0.10439 -0.013537)
      PathPoint P4: femur_l (-0.0060165 -0.14229 -0.041213)
    Thelen2003Muscle iliacus_l: max_isometric_force=1073 optimal_fiber_length=0.097678 tendon_slack_length=0.097678
        pennation_angle_at_optimal=0.12217
      # Maximum isometric force that the fibers can generate
      # Optimal length of the muscle fibers
      # Resting length of the tendon
      # Angle between tendon and fibers at optimal fiber length expressed in radians
      # Maximum contraction velocity of the fibers, in optimal fiberlengths/second
      # time constant for ramping up muscle activation
      # time constant for ramping down of muscle activation
      # tendon strain at maximum isometric muscle force
      # passive muscle strain at maximum isometric muscle force
      # shape factor for Gaussian active muscle force-length relationship
      # exponential shape factor for passive force-length relationship
      # force-velocity shape factor
      # The set of points defining the path
      # The wrap objecs that are associated with this path
      PathPoint P1: pelvis (-0.065091 0.03525 -0.084204)
      PathPoint P2: pelvis (-0.024916 -0.053116 -0.079964)
      PathPoint P4: femur_l (0.0017047 -0.054449 -0.0057157)
      PathPoint P5: femur_l (-0.019353 -0.06227 -0.012935)
      ConditionalPathPoint P3: pelvis (-0.027813 -0.077742 -0.080457) range=(-1.5708 0.7854) coordinate=hip_flexion_l
    Thelen2003Muscle psoas_l: max_isometric_force=1113 optimal_fiber_length=0.0975 tendon_slack_length=0.156
        pennation_angle_at_optimal=0.13963
      # Maximum isometric force that the fibers can generate
      # Optimal length of the muscle fibers
      # Resting length of the tendon
      # Angle between tendon and fibers at optimal fiber length expressed in radians
      # Maximum contraction velocity of the fibers, in optimal fiberlengths/second
      # time constant for ramping up muscle activation
      # time constant for ramping down of muscle activation
      # tendon strain at maximum isometric muscle force
      # passive muscle strain at maximum isometric muscle force
      # shape factor for Gaussian active muscle force-length relationship
      # exponential shape factor for passive force-length relationship
      # force-velocity shape factor
      # The set of points defining the path
      # The wrap objecs that are associated with this path
      PathPoint P1: pelvis (-0.062483 0.085661 -0.028495)
      PathPoint P2: pelvis (-0.022985 -0.055047 -0.074837)
      PathPoint P4: femur_l (0.0016044 -0.050839 -0.0038104)
      PathPoint P5: femur_l (-0.018852 -0.059864 -0.010429)
      ConditionalPathPoint P3: pelvis (-0.027813 -0.077742 -0.080457) range=(-1.5708 0.7854) coordinate=hip_flexion_l
    Thelen2003Muscle quad_fem_l: max_isometric_force=381 optimal_fiber_length=0.053413 tendon_slack_length=0.023739
        pennation_angle_at_optimal=0
      # Maximum isometric force that the fibers can generate
      # Optimal length of the muscle fibers
      # Resting length of the tendon
      # Angle between tendon and fibers at optimal fiber length expressed in radians
      # Maximum contraction velocity of the fibers, in optimal fiberlengths/second
      # time constant for ramping up muscle activation
      # time constant for ramping down of muscle activation
      # tendon strain at maximum isometric muscle force
      # passive muscle strain at maximum isometric muscle force
      # shape factor for Gaussian active muscle force-length relationship
      # exponential shape factor for passive force-length relationship
      # force-velocity shape factor
      # The set of points defining the path
      # The wrap objecs that are associated with this path
      PathPoint P1: pelvis (-0.11038 -0.11116 -0.051272)
      PathPoint P2: femur_l (-0.038205 -0.035999 -0.0367)
    Thelen2003Muscle gem_l: max_isometric_force=164 optimal_fiber_length=0.023703 tendon_slack_length=0.038518
        pennation_angle_at_optimal=0
      # Maximum isometric force that the fibers can generate
      # Optimal length of the muscle fibers
      # Resting length of the tendon
      # Angle between tendon and fibers at optimal fiber length expressed in radians
      # Maximum contraction velocity of the fibers, in optimal fiberlengths/second
      # time constant for ramping up muscle activation
      # time constant for ramping down of muscle activation
      # tendon strain at maximum isometric muscle force
      # passive muscle strain at maximum isometric muscle force
      # shape factor for Gaussian active muscle force-length relationship
      # exponential shape factor for passive force-length relationship
      # force-velocity shape factor
      # The set of points defining the path
      # The wrap objecs that are associated with this path
      PathPoint P1: pelvis (-0.10942 -0.079191 -0.0704)
      PathPoint P2: femur_l (-0.014239 -0.0033091 -0.044422)
    Thelen2003Muscle peri_l: max_isometric_force=444 optimal_fiber_length=0.025492 tendon_slack_length=0.11275
        pennation_angle_at_optimal=0.17453
      # Maximum isometric force that the fibers can generate
      # Optimal length of the muscle fibers
      # Resting length of the tendon
      # Angle between tendon and fibers at optimal fiber length expressed in radians
      # Maximum contraction velocity of the fibers, in optimal fiberlengths/second
      # time constant for ramping up muscle activation
      # time constant for ramping down of muscle activation
      # tendon strain at maximum isometric muscle force
      # passive muscle strain at maximum isometric muscle force
      # shape factor for Gaussian active muscle force-length relationship
      # exponential shape factor for passive force-length relationship
      # force-velocity shape factor
      # The set of points defining the path
      # The wrap objecs that are associated with this path
      PathPoint P1: pelvis (-0.13482 0.00028972 -0.023171)
      PathPoint P2: pelvis (-0.11521 -0.026654 -0.06478)
      PathPoint P3: femur_l (-0.014841 -0.0036099 -0.04382)
    Thelen2003Muscle rect_fem_l: max_isometric_force=1169 optimal_fiber_length=0.11415 tendon_slack_length=0.31042
        pennation_angle_at_optimal=0.087266
      # Maximum isometric force that the fibers can generate
      # Optimal length of the muscle fibers
      # Resting length of the tendon
      # Angle between tendon and fibers at optimal fiber length expressed in radians
      # Maximum contraction velocity of the fibers, in optimal fiberlengths/second
      # time constant for ramping up muscle activation
      # time constant for ramping down of muscle activation
      # tendon strain at maximum isometric muscle force
      # passive muscle strain at maximum isometric muscle force
      # shape factor for Gaussian active muscle force-length relationship
      # exponential shape factor for passive force-length relationship
      # force-velocity shape factor
      # The set of points defining the path
      # The wrap objecs that are associated with this path
      PathPoint P1: pelvis (-0.028489 -0.030034 -0.095444)
      ConditionalPathPoint P2: femur_l (0.033492 -0.40411 -0.0019052) range=(-2.618 -1.46) coordinate=knee_angle_l
      MovingPathPoint P3: tibia_l (0.050425 0.022192 -0.0013534) x_coordinate=knee_angle_l y_coordinate=knee_angle_l
          z_coordinate=knee_angle_l
        x_location: MultiplierFunction: scale=0.96673
          SimmSpline: x=(-2.0944 -2 -1.5708 -1.4575 -1.3963 -1.0472 -0.69813 -0.52639 -0.34907 -0.17453 0 0.00017453 0.00034907 0.027925 0.087266 0.17453 2.0944)
              y=(0.015581 0.017994 0.027508 0.029656 0.030762 0.036569 0.042207 0.04509 0.048391 0.05343 0.061758 0.061767 0.061776 0.063308 0.066994 0.073303 0.057348)
        y_location: MultiplierFunction: scale=0.96673
          SimmSpline: x=(-2.0944 -2 -1.5708 -1.4575 -1.3963 -1.0472 -0.69813 -0.52639 -0.34907 -0.17453 0 0.00017453 0.00034907 0.027925 0.087266 0.17453 2.0944)
              y=(0.023412 0.023761 0.025114 0.025279 0.025315 0.024918 0.024237 0.023845 0.02342 0.022764 0.020984 0.020981 0.020979 0.020522 0.019175 0.015955 -0.067377)
        z_location: MultiplierFunction: scale=0.96673
          SimmSpline: x=(-2.0944 0.1745) y=(-0.0014 -0.0014)
    Thelen2003Muscle vas_med_l: max_isometric_force=1294 optimal_fiber_length=0.089444 tendon_slack_length=0.12663
        pennation_angle_at_optimal=0.087266
      # Maximum isometric force that the fibers can generate
      # Optimal length of the muscle fibers
      # Resting length of the tendon
      # Angle between tendon and fibers at optimal fiber length expressed in radians
      # Maximum contraction velocity of the fibers, in optimal fiberlengths/second
      # time constant for ramping up muscle activation
      # time constant for ramping down of muscle activation
      # tendon strain at maximum isometric muscle force
      # passive muscle strain at maximum isometric muscle force
      # shape factor for Gaussian active muscle force-length relationship
      # exponential shape factor for passive force-length relationship
      # force-velocity shape factor
      # The set of points defining the path
      # The wrap objecs that are associated with this path
      PathPoint P1: femur_l (0.014038 -0.21048 -0.018852)
      PathPoint P2: femur_l (0.035698 -0.27766 -0.00090247)
      ConditionalPathPoint P3: femur_l (0.037102 -0.40591 0.012534) range=(-2.618 -1.21) coordinate=knee_angle_l
      ConditionalPathPoint P4: femur_l (0.027475 -0.42667 0.013136) range=(-2.618 -1.7801) coordinate=knee_angle_l
      MovingPathPoint P5: tibia_l (0.044771 0.021947 0.014114) x_coordinate=knee_angle_l y_coordinate=knee_angle_l
          z_coordinate=knee_angle_l
        x_location: MultiplierFunction: scale=0.96673
          SimmSpline: x=(-2.0944 -2 -1.5708 -1.4575 -1.3963 -1.0472 -0.69813 -0.52639 -0.34907 -0.17453 0 0.00017453 0.00034907 0.027925 0.087266 0.17453 2.0944)
              y=(0.009811 0.012224 0.021737 0.023885 0.02499 0.030796 0.036419 0.039287 0.042565 0.047576 0.055959 0.055968 0.055978 0.057542 0.061337 0.06795 0.062933)
        y_location: MultiplierFunction: scale=0.96673
          SimmSpline: x=(-2.0944 -2 -1.5708 -1.4575 -1.3963 -1.0472 -0.69813 -0.52639 -0.34907 -0.17453 0 0.00017453 0.00034907 0.027925 0.087266 0.17453 2.0944)
              y=(0.022415 0.022765 0.024126 0.024293 0.024329 0.023946 0.023359 0.023068 0.022834 0.022636 0.021792 0.02179 0.021789 0.021537 0.020684 0.018327 -0.06562)
        z_location: MultiplierFunction: scale=0.96673
          SimmSpline: x=(-2.0944 2.0944) y=(0.0146 0.0146)
    Thelen2003Muscle vas_int_l: max_isometric_force=1365 optimal_fiber_length=0.087576 tendon_slack_length=0.1369
        pennation_angle_at_optimal=0.05236
      # Maximum isometric force that the fibers can generate
      # Optimal length of the muscle fibers
      # Resting length of the tendon
      # Angle between tendon and fibers at optimal fiber length expressed in radians
      # Maximum contraction velocity of the fibers, in optimal fiberlengths/second
      # time constant for ramping up muscle activation
      # time constant for ramping down of muscle activation
      # tendon strain at maximum isometric muscle force
      # passive muscle strain at maximum isometric muscle force
      # shape factor for Gaussian active muscle force-length relationship
      # exponential shape factor for passive force-length relationship
      # force-velocity shape factor
      # The set of points defining the path
      # The wrap objecs that are associated with this path
      PathPoint P1: femur_l (0.02908 -0.19293 -0.031085)
      PathPoint P2: femur_l (0.033592 -0.20897 -0.028578)
      ConditionalPathPoint P3: femur_l (0.034394 -0.40411 -0.0055151) range=(-2.618 -1.42) coordinate=knee_angle_l
      MovingPathPoint P4: tibia_l (0.043692 0.025194 -0.0017401) x_coordinate=knee_angle_l y_coordinate=knee_angle_l
          z_coordinate=knee_angle_l
        x_location: MultiplierFunction: scale=0.96673
          SimmSpline: x=(-2.0944 -2 -1.5708 -1.4575 -1.3963 -1.0472 -0.69813 -0.52639 -0.34907 -0.17453 0 0.00017453 0.00034907 0.027925 0.087266 0.17453 2.0944)
              y=(0.0082733 0.010687 0.020204 0.022353 0.023458 0.029271 0.034946 0.037871 0.041257 0.046529 0.055463 0.055474 0.055484 0.057172 0.061272 0.068437 0.064882)
        y_location: MultiplierFunction: scale=0.96673
          SimmSpline: x=(-2.0944 -2 -1.5708 -1.4575 -1.3963 -1.0472 -0.69813 -0.52639 -0.34907 -0.17453 0 0.00017453 0.00034907 0.027925 0.087266 0.17453 2.0944)
              y=(0.025599 0.025949 0.027312 0.02748 0.027515 0.027136 0.026574 0.026307 0.026119 0.026013 0.025292 0.025291 0.02529 0.025053 0.024219 0.021829 -0.068571)
        z_location: MultiplierFunction: scale=0.96673
          SimmSpline: x=(-2.0944 2.0944) y=(-0.0018 -0.0018)
    Thelen2003Muscle vas_lat_l: max_isometric_force=1871 optimal_fiber_length=0.084361 tendon_slack_length=0.15767
        pennation_angle_at_optimal=0.087266
      # Maximum isometric force that the fibers can generate
      # Optimal length of the muscle fibers
      # Resting length of the tendon
      # Angle between tendon and fibers at optimal fiber length expressed in radians
      # Maximum contraction velocity of the fibers, in optimal fiberlengths/second
      # time constant for ramping up muscle activation
      # time constant for ramping down of muscle activation
      # tendon strain at maximum isometric muscle force
      # passive muscle strain at maximum isometric muscle force
      # shape factor for Gaussian active muscle force-length relationship
      # exponential shape factor for passive force-length relationship
      # force-velocity shape factor
      # The set of points defining the path
      # The wrap objecs that are associated with this path
      PathPoint P1: femur_l (0.0048132 -0.18591 -0.034996)
      PathPoint P2: femur_l (0.026974 -0.25981 -0.041012)
      ConditionalPathPoint P3: femur_l (0.036199 -0.40411 -0.020556) range=(-2.618 -1.21) coordinate=knee_angle_l
      ConditionalPathPoint P4: femur_l (0.025369 -0.42546 -0.018451) range=(-2.618 -1.92) coordinate=knee_angle_l
      MovingPathPoint P5: tibia_l (0.048954 0.020549 -0.015951) x_coordinate=knee_angle_l y_coordinate=knee_angle_l
          z_coordinate=knee_angle_l
        x_location: MultiplierFunction: scale=0.96673
          SimmSpline: x=(-2.0944 -2 -1.5708 -1.4575 -1.3963 -1.0472 -0.69813 -0.52639 -0.34907 -0.17453 0 0.00017453 0.00034907 0.027925 0.087266 0.17453 2.0944)
              y=(0.01429 0.016703 0.026215 0.028362 0.029467 0.035271 0.040878 0.043729 0.04697 0.051874 0.059956 0.059965 0.059974 0.061458 0.065035 0.071187 0.058377)
        y_location: MultiplierFunction: scale=0.96673
          SimmSpline: x=(-2.0944 -2 -1.5708 -1.4575 -1.3963 -1.0472 -0.69813 -0.52639 -0.34907 -0.17453 0 0.00017453 0.00034907 0.027925 0.087266 0.17453 2.0944)
              y=(0.021532 0.021882 0.023236 0.023402 0.023437 0.023044 0.022384 0.022015 0.021636 0.021097 0.019586 0.019584 0.019582 0.01919 0.018008 0.015107 -0.065342)
        z_location: MultiplierFunction: scale=0.96673
          SimmSpline: x=(-2.0944 2.0944) y=(-0.0165 -0.0165)
    Thelen2003Muscle med_gas_l: max_isometric_force=1558 optimal_fiber_length=0.057951 tendon_slack_length=0.37668
        pennation_angle_at_optimal=0.29671
      # Maximum isometric force that the fibers can generate
      # Optimal length of the muscle fibers
      # Resting length of the tendon
      # Angle between tendon and fibers at optimal fiber length expressed in radians
      # Maximum contraction velocity of the fibers, in optimal fiberlengths/second
      # time constant for ramping up muscle activation
      # time constant for ramping down of muscle activation
      # tendon strain at maximum isometric muscle force
      # passive muscle strain at maximum isometric muscle force
      # shape factor for Gaussian active muscle force-length relationship
      # exponential shape factor for passive force-length relationship
      # force-velocity shape factor
      # The set of points defining the path
      # The wrap objecs that are associated with this path
      PathPoint P1: femur_l (-0.019052 -0.39398 0.023564)
      PathPoint P3: calcn_l (0 0.028332 0.0048438)
      ConditionalPathPoint P2: femur_l (-0.030082 -0.4033 0.025871) range=(-0.7854 0.17453) coordinate=knee_angle_l
    Thelen2003Muscle lat_gas_l: max_isometric_force=683 optimal_fiber_length=0.061798 tendon_slack_length=0.36692
        pennation_angle_at_optimal=0.13963
      # Maximum isometric force that the fibers can generate
      # Optimal length of the muscle fibers
      # Resting length of the tendon
      # Angle between tendon and fibers at optimal fiber length expressed in radians
      # Maximum contraction velocity of the fibers, in optimal fiberlengths/second
      # time constant for ramping up muscle activation
      # time constant for ramping down of muscle activation
      # tendon strain at maximum isometric muscle force
      # passive muscle strain at maximum isometric muscle force
      # shape factor for Gaussian active muscle force-length relationship
      # exponential shape factor for passive force-length relationship
      # force-velocity shape factor
      # The set of points defining the path
      # The wrap objecs that are associated with this path
      PathPoint P1: femur_l (-0.02206 -0.39568 -0.027275)
      PathPoint P3: calcn_l (0 0.028332 0.0048438)
      ConditionalPathPoint P2: femur_l (-0.030082 -0.4029 -0.027475) range=(-0.7854 0.17453) coordinate=knee_angle_l
    Thelen2003Muscle soleus_l: max_isometric_force=3549 optimal_fiber_length=0.048171 tendon_slack_length=0.24085
        pennation_angle_at_optimal=0.43633
      # Maximum isometric force that the fibers can generate
      # Optimal length of the muscle fibers
      # Resting length of the tendon
      # Angle between tendon and fibers at optimal fiber length expressed in radians
      # Maximum contraction velocity of the fibers, in optimal fiberlengths/second
      # time constant for ramping up muscle activation
      # time constant for ramping down of muscle activation
      # tendon strain at maximum isometric muscle force
      # passive muscle strain at maximum isometric muscle force
      # shape factor for Gaussian active muscle force-length relationship
      # exponential shape factor for passive force-length relationship
      # force-velocity shape factor
      # The set of points defining the path
      # The wrap objecs that are associated with this path
      PathPoint P1: tibia_l (-0.0023202 -0.1482 -0.0068638)
      PathPoint P2: calcn_l (0 0.028332 0.0048438)
    Thelen2003Muscle tib_post_l: max_isometric_force=1588 optimal_fiber_length=0.029757 tendon_slack_length=0.29757
        pennation_angle_at_optimal=0.20944
      # Maximum isometric force that the fibers can generate
      # Optimal length of the muscle fibers
      # Resting length of the tendon
      # Angle between tendon and fibers at optimal fiber length expressed in radians
      # Maximum contraction velocity of the fibers, in optimal fiberlengths/second
      # time constant for ramping up muscle activation
      # time constant for ramping down of muscle activation
      # tendon strain at maximum isometric muscle force
      # passive muscle strain at maximum isometric muscle force
      # shape factor for Gaussian active muscle force-length relationship
      # exponential shape factor for passive force-length relationship
      # force-velocity shape factor
      # The set of points defining the path
      # The wrap objecs that are associated with this path
      PathPoint P1: tibia_l (-0.0090873 -0.13031 -0.0018368)
      PathPoint P2: tibia_l (-0.013921 -0.39162 0.022138)
      PathPoint P3: calcn_l (0.038111 0.030525 0.026138)
      PathPoint P4: calcn_l (0.070555 0.014531 0.025681)
    Thelen2003Muscle flex_dig_l: max_isometric_force=310 optimal_fiber_length=0.032025 tendon_slack_length=0.37677
        pennation_angle_at_optimal=0.12217
      # Maximum isometric force that the fibers can generate
      # Optimal length of the muscle fibers
      # Resting length of the tendon
      # Angle between tendon and fibers at optimal fiber length expressed in radians
      # Maximum contraction velocity of the fibers, in optimal fiberlengths/second
      # time constant for ramping up muscle activation
      # time constant for ramping down of muscle activation
      # tendon strain at maximum isometric muscle force
      # passive muscle strain at maximum isometric muscle force
      # shape factor for Gaussian active muscle force-length relationship
      # exponential shape factor for passive force-length relationship
      # force-velocity shape factor
      # The set of points defining the path
      # The wrap objecs that are associated with this path
      PathPoint P1: tibia_l (-0.0080239 -0.19779 0.0017401)
      PathPoint P2: tibia_l (-0.014888 -0.39162 0.018948)
      PathPoint P3: calcn_l (0.039847 0.028789 0.02559)
      PathPoint P4: calcn_l (0.064706 0.016085 0.024036)
      PathPoint P5: calcn_l (0.15153 -0.0074028 -0.010601)
      PathPoint P6: toes_l (-0.0017365 -0.0071286 -0.013435)
      PathPoint P7: toes_l (0.026047 -0.0064889 -0.019649)
      PathPoint P8: toes_l (0.040304 -0.0054836 -0.022117)
    Thelen2003Muscle flex_hal_l: max_isometric_force=322 optimal_fiber_length=0.040412 tendon_slack_length=0.35713
        pennation_angle_at_optimal=0.17453
      # Maximum isometric force that the fibers can generate
      # Optimal length of the muscle fibers
      # Resting length of the tendon
      # Angle between tendon and fibers at optimal fiber length expressed in radians
      # Maximum contraction velocity of the fibers, in optimal fiberlengths/second
      # time constant for ramping up muscle activation
      # time constant for ramping down of muscle activation
      # tendon strain at maximum isometric muscle force
      # passive muscle strain at maximum isometric muscle force
      # shape factor for Gaussian active muscle force-length relationship
      # exponential shape factor for passive force-length relationship
      # force-velocity shape factor
      # The set of points defining the path
      # The wrap objecs that are associated with this path
      PathPoint P1: tibia_l (-0.0076372 -0.22564 -0.023588)
      PathPoint P2: tibia_l (-0.017981 -0.39433 0.016821)
      PathPoint P3: calcn_l (0.034181 0.025224 0.022026)
      PathPoint P4: calcn_l (0.094865 0.0062147 0.023397)
      PathPoint P5: calcn_l (0.15774 -0.0048438 0.024585)
      PathPoint P6: toes_l (0.014166 -0.0058491 0.024219)
      PathPoint P7: toes_l (0.051363 -0.009322 0.016542)
    Thelen2003Muscle tib_ant_l: max_isometric_force=905 optimal_fiber_length=0.09379 tendon_slack_length=0.21342
        pennation_angle_at_optimal=0.087266
      # Maximum isometric force that the fibers can generate
      # Optimal length of the muscle fibers
      # Resting length of the tendon
      # Angle between tendon and fibers at optimal fiber length expressed in radians
      # Maximum contraction velocity of the fibers, in optimal fiberlengths/second
      # time constant for ramping up muscle activation
      # time constant for ramping down of muscle activation
      # tendon strain at maximum isometric muscle force
      # passive muscle strain at maximum isometric muscle force
      # shape factor for Gaussian active muscle force-length relationship
      # exponential shape factor for passive force-length relationship
      # force-velocity shape factor
      # The set of points defining the path
      # The wrap objecs that are associated with this path
      PathPoint P1: tibia_l (0.017305 -0.157 -0.011117)
      PathPoint P2: tibia_l (0.031806 -0.38196 0.017111)
      PathPoint P3: calcn_l (0.10656 0.016268 0.027875)
    Thelen2003Muscle per_brev_l: max_isometric_force=435 optimal_fiber_length=0.04788 tendon_slack_length=0.15417
        pennation_angle_at_optimal=0.087266
      # Maximum isometric force that the fibers can generate
      # Optimal length of the muscle fibers
      # Resting length of the tendon
      # Angle between tendon and fibers at optimal fiber length expressed in radians
      # Maximum contraction velocity of the fibers, in optimal fiberlengths/second
      # time constant for ramping up muscle activation
      # time constant for ramping down of muscle activation
      # tendon strain at maximum isometric muscle force
      # passive muscle strain at maximum isometric muscle force
      # shape factor for Gaussian active muscle force-length relationship
      # exponential shape factor for passive force-length relationship
      # force-velocity shape factor
      # The set of points defining the path
      # The wrap objecs that are associated with this path
      PathPoint P1: tibia_l (-0.0067671 -0.2558 -0.031419)
      PathPoint P2: tibia_l (-0.019141 -0.40448 -0.027359)
      PathPoint P3: tibia_l (-0.013921 -0.41521 -0.027939)
      PathPoint P4: calcn_l (0.043046 0.024676 -0.021294)
      PathPoint P5: calcn_l (0.061873 0.020015 -0.031348)
    Thelen2003Muscle per_long_l: max_isometric_force=943 optimal_fiber_length=0.04664 tendon_slack_length=0.32838
        pennation_angle_at_optimal=0.17453
      # Maximum isometric force that the fibers can generate
      # Optimal length of the muscle fibers
      # Resting length of the tendon
      # Angle between tendon and fibers at optimal fiber length expressed in radians
      # Maximum contraction velocity of the fibers, in optimal fiberlengths/second
      # time constant for ramping up muscle activation
      # time constant for ramping down of muscle activation
      # tendon strain at maximum isometric muscle force
      # passive muscle strain at maximum isometric muscle force
      # shape factor for Gaussian active muscle force-length relationship
      # exponential shape factor for passive force-length relationship
      # force-velocity shape factor
      # The set of points defining the path
      # The wrap objecs that are associated with this path
      PathPoint P1: tibia_l (0.00048337 -0.15158 -0.034996)
      PathPoint P2: tibia_l (-0.020011 -0.40651 -0.027648)
      PathPoint P3: tibia_l (-0.015661 -0.41753 -0.027939)
      PathPoint P4: calcn_l (0.04003 0.02102 -0.020198)
      PathPoint P5: calcn_l (0.062238 0.0096876 -0.025955)
      PathPoint P6: calcn_l (0.077866 0.0063061 -0.010784)
      PathPoint P7: calcn_l (0.10995 0.0077684 0.016816)
    Thelen2003Muscle per_tert_l: max_isometric_force=180 optimal_fiber_length=0.075372 tendon_slack_length=0.095407
        pennation_angle_at_optimal=0.22689
      # Maximum isometric force that the fibers can generate
      # Optimal length of the muscle fibers
      # Resting length of the tendon
      # Angle between tendon and fibers at optimal fiber length expressed in radians
      # Maximum contraction velocity of the fibers, in optimal fiberlengths/second
      # time constant for ramping up muscle activation
      # time constant for ramping down of muscle activation
      # tendon strain at maximum isometric muscle force
      # passive muscle strain at maximum isometric muscle force
      # shape factor for Gaussian active muscle force-length relationship
      # exponential shape factor for passive force-length relationship
      # force-velocity shape factor
      # The set of points defining the path
      # The wrap objecs that are associated with this path
      PathPoint P1: tibia_l (0.00096673 -0.27107 -0.022332)
      PathPoint P2: tibia_l (0.022138 -0.39336 -0.015371)
      PathPoint P3: calcn_l (0.078323 0.020837 -0.027326)
    Thelen2003Muscle ext_dig_l: max_isometric_force=512 optimal_fiber_length=0.096643 tendon_slack_length=0.32688
        pennation_angle_at_optimal=0.13963
      # Maximum isometric force that the fibers can generate
      # Optimal length of the muscle fibers
      # Resting length of the tendon
      # Angle between tendon and fibers at optimal fiber length expressed in radians
      # Maximum contraction velocity of the fibers, in optimal fiberlengths/second
      # time constant for ramping up muscle activation
      # time constant for ramping down of muscle activation
      # tendon strain at maximum isometric muscle force
      # passive muscle strain at maximum isometric muscle force
      # shape factor for Gaussian active muscle force-length relationship
      # exponential shape factor for passive force-length relationship
      # force-velocity shape factor
      # The set of points defining the path
      # The wrap objecs that are associated with this path
      PathPoint P1: tibia_l (0.0030935 -0.13351 -0.026682)
      PathPoint P2: tibia_l (0.027939 -0.38737 -0.0069605)
      PathPoint P3: calcn_l (0.084264 0.03546 9.1392e-5)
      PathPoint P4: calcn_l (0.14769 0.0050266 -0.011881)
      PathPoint P5: toes_l (0.00027418 0.0042954 -0.013983)
      PathPoint P6: toes_l (0.040487 -0.00036557 -0.022848)
    Thelen2003Muscle ext_hal_l: max_isometric_force=162 optimal_fiber_length=0.1049 tendon_slack_length=0.28825
        pennation_angle_at_optimal=0.10472
      # Maximum isometric force that the fibers can generate
      # Optimal length of the muscle fibers
      # Resting length of the tendon
      # Angle between tendon and fibers at optimal fiber length expressed in radians
      # Maximum contraction velocity of the fibers, in optimal fiberlengths/second
      # time constant for ramping up muscle activation
      # time constant for ramping down of muscle activation
      # tendon strain at maximum isometric muscle force
      # passive muscle strain at maximum isometric muscle force
      # shape factor for Gaussian active muscle force-length relationship
      # exponential shape factor for passive force-length relationship
      # force-velocity shape factor
      # The set of points defining the path
      # The wrap objecs that are associated with this path
      PathPoint P1: tibia_l (0.0011601 -0.17082 -0.022041)
      PathPoint P2: tibia_l (0.031516 -0.38524 0.0082172)
      PathPoint P3: calcn_l (0.088651 0.035552 0.019284)
      PathPoint P4: calcn_l (0.11817 0.02824 0.023488)
      PathPoint P5: calcn_l (0.15847 0.012703 0.02559)
      PathPoint P6: toes_l (0.027235 0.0037471 0.022391)
      PathPoint P7: toes_l (0.051454 0.0031073 0.016999)
    Thelen2003Muscle ercspn_r: max_isometric_force=2500 optimal_fiber_length=0.1152 tendon_slack_length=0.028801
        pennation_angle_at_optimal=0
      # Maximum isometric force that the fibers can generate
      # Optimal length of the muscle fibers
      # Resting length of the tendon
      # Angle between tendon and fibers at optimal fiber length expressed in radians
      # Maximum contraction velocity of the fibers, in optimal fiberlengths/second
      # time constant for ramping up muscle activation
      # time constant for ramping down of muscle activation
      # tendon strain at maximum isometric muscle force
      # passive muscle strain at maximum isometric muscle force
      # shape factor for Gaussian active muscle force-length relationship
      # exponential shape factor for passive force-length relationship
      # force-velocity shape factor
      # The set of points defining the path
      # The wrap objecs that are associated with this path
      PathPoint P1: pelvis (-0.1352 0.042396 0.042989)
      PathPoint P2: torso (-0.04906 0.10536 0.021497)
    Thelen2003Muscle ercspn_l: max_isometric_force=2500 optimal_fiber_length=0.1152 tendon_slack_length=0.028801
        pennation_angle_at_optimal=0
      # Maximum isometric force that the fibers can generate
      # Optimal length of the muscle fibers
      # Resting length of the tendon
      # Angle between tendon and fibers at optimal fiber length expressed in radians
      # Maximum contraction velocity of the fibers, in optimal fiberlengths/second
      # time constant for ramping up muscle activation
      # time constant for ramping down of muscle activation
      # tendon strain at maximum isometric muscle force
      # passive muscle strain at maximum isometric muscle force
      # shape factor for Gaussian active muscle force-length relationship
      # exponential shape factor for passive force-length relationship
      # force-velocity shape factor
      # The set of points defining the path
      # The wrap objecs that are associated with this path
      PathPoint P1: pelvis (-0.1352 0.042396 -0.042989)
      PathPoint P2: torso (-0.04906 0.10536 -0.021497)
    Thelen2003Muscle intobl_r: max_isometric_force=900 optimal_fiber_length=0.096834 tendon_slack_length=0.096834
        pennation_angle_at_optimal=0
      # Maximum isometric force that the fibers can generate
      # Optimal length of the muscle fibers
      # Resting length of the tendon
      # Angle between tendon and fibers at optimal fiber length expressed in radians
      # Maximum contraction velocity of the fibers, in optimal fiberlengths/second
      # time constant for ramping up muscle activation
      # time constant for ramping down of muscle activation
      # tendon strain at maximum isometric muscle force
      # passive muscle strain at maximum isometric muscle force
      # shape factor for Gaussian active muscle force-length relationship
      # exponential shape factor for passive force-length relationship
      # force-velocity shape factor
      # The set of points defining the path
      # The wrap objecs that are associated with this path
      PathPoint P1: pelvis (-0.03863 0.067602 0.11408)
      PathPoint P2: torso (0.062441 0.15325 0.01338)
    Thelen2003Muscle intobl_l: max_isometric_force=900 optimal_fiber_length=0.096834 tendon_slack_length=0.096834
        pennation_angle_at_optimal=0
      # Maximum isometric force that the fibers can generate
      # Optimal length of the muscle fibers
      # Resting length of the tendon
      # Angle between tendon and fibers at optimal fiber length expressed in radians
      # Maximum contraction velocity of the fibers, in optimal fiberlengths/second
      # time constant for ramping up muscle activation
      # time constant for ramping down of muscle activation
      # tendon strain at maximum isometric muscle force
      # passive muscle strain at maximum isometric muscle force
      # shape factor for Gaussian active muscle force-length relationship
      # exponential shape factor for passive force-length relationship
      # force-velocity shape factor
      # The set of points defining the path
      # The wrap objecs that are associated with this path
      PathPoint P1: pelvis (-0.03863 0.067602 -0.11408)
      PathPoint P2: torso (0.062441 0.15325 -0.01338)
    Thelen2003Muscle extobl_r: max_isometric_force=900 optimal_fiber_length=0.11432 tendon_slack_length=0.13337
        pennation_angle_at_optimal=0
      # Maximum isometric force that the fibers can generate
      # Optimal length of the muscle fibers
      # Resting length of the tendon
      # Angle between tendon and fibers at optimal fiber length expressed in radians
      # Maximum contraction velocity of the fibers, in optimal fiberlengths/second
      # time constant for ramping up muscle activation
      # time constant for ramping down of muscle activation
      # tendon strain at maximum isometric muscle force
      # passive muscle strain at maximum isometric muscle force
      # shape factor for Gaussian active muscle force-length relationship
      # exponential shape factor for passive force-length relationship
      # force-velocity shape factor
      # The set of points defining the path
      # The wrap objecs that are associated with this path
      PathPoint P1: pelvis (-0.028972 -0.061421 0.00986)
      PathPoint P2: torso (0.057981 0.10536 0.098121)
    Thelen2003Muscle extobl_l: max_isometric_force=900 optimal_fiber_length=0.11432 tendon_slack_length=0.13337
        pennation_angle_at_optimal=0
      # Maximum isometric force that the fibers can generate
      # Optimal length of the muscle fibers
      # Resting length of the tendon
      # Angle between tendon and fibers at optimal fiber length expressed in radians
      # Maximum contraction velocity of the fibers, in optimal fiberlengths/second
      # time constant for ramping up muscle activation
      # time constant for ramping down of muscle activation
      # tendon strain at maximum isometric muscle force
      # passive muscle strain at maximum isometric muscle force
      # shape factor for Gaussian active muscle force-length relationship
      # exponential shape factor for passive force-length relationship
      # force-velocity shape factor
      # The set of points defining the path
      # The wrap objecs that are associated with this path
      PathPoint P1: pelvis (-0.028972 -0.061421 -0.00986)
      PathPoint P2: torso (0.057981 0.10536 -0.098121)
    HuntCrossleyForce grf_r1: transition_velocity=0.1
      ContactParametersSet contact_parameters:
        ContactParameters: geometry=(plate s1_r) stiffness=3777162 dissipation=2 static_friction=0.8
            dynamic_friction=0.8 viscous_friction=0.5
    HuntCrossleyForce grf_r2: transition_velocity=0.1
      ContactParametersSet contact_parameters:
        ContactParameters: geometry=(plate s2_r) stiffness=3777162 dissipation=2 static_friction=0.8
            dynamic_friction=0.8 viscous_friction=0.5
    HuntCrossleyForce grf_r3: transition_velocity=0.1
      ContactParametersSet contact_parameters:
        ContactParameters: geometry=(plate s3_r) stiffness=3777162 dissipation=2 static_friction=0.8
            dynamic_friction=0.8 viscous_friction=0.5
    HuntCrossleyForce grf_r4: transition_velocity=0.1
      ContactParametersSet contact_parameters:
        ContactParameters: geometry=(plate s4_r) stiffness=3777162 dissipation=2 static_friction=0.8
            dynamic_friction=0.8 viscous_friction=0.5
    HuntCrossleyForce grf_r5: transition_velocity=0.1
      ContactParametersSet contact_parameters:
        ContactParameters: geometry=(plate s5_r) stiffness=3777162 dissipation=2 static_friction=0.8
            dynamic_friction=0.8 viscous_friction=0.5
    HuntCrossleyForce grf_l1: transition_velocity=0.1
      ContactParametersSet contact_parameters:
        ContactParameters: geometry=(plate s1_l) stiffness=3777162 dissipation=2 static_friction=0.8
            dynamic_friction=0.8 viscous_friction=0.5
    HuntCrossleyForce grf_l2: transition_velocity=0.1
      ContactParametersSet contact_parameters:
        ContactParameters: geometry=(plate s2_l) stiffness=3777162 dissipation=2 static_friction=0.8
            dynamic_friction=0.8 viscous_friction=0.5
    HuntCrossleyForce grf_l3: transition_velocity=0.1
      ContactParametersSet contact_parameters:
        ContactParameters: geometry=(plate s3_l) stiffness=3777162 dissipation=2 static_friction=0.8
            dynamic_friction=0.8 viscous_friction=0.5
    HuntCrossleyForce grf_l4: transition_velocity=0.1
      ContactParametersSet contact_parameters:
        ContactParameters: geometry=(plate s4_l) stiffness=3777162 dissipation=2 static_friction=0.8
            dynamic_friction=0.8 viscous_friction=0.5
    HuntCrossleyForce grf_l5: transition_velocity=0.1
      ContactParametersSet contact_parameters:
        ContactParameters: geometry=(plate s5_l) stiffness=3777162 dissipation=2 static_friction=0.8
            dynamic_friction=0.8 viscous_friction=0.5
    ObjectGroup R_hip_abd: members=(glut_max1_r glut_med1_r glut_med2_r glut_med3_r glut_min1_r glut_min2_r glut_min3_r peri_r sar_r tfl_r)
    ObjectGroup R_hip_flex: members=(add_brev_r add_long_r glut_med1_r glut_min1_r grac_r iliacus_r pect_r psoas_r rect_fem_r sar_r tfl_r)
    ObjectGroup R_hip_inrot: members=(glut_med1_r glut_min1_r iliacus_r psoas_r tfl_r)
    ObjectGroup R_hip_exrot: members=(gem_r glut_med3_r glut_min3_r peri_r quad_fem_r)
    ObjectGroup R_hip_ext: members=(add_long_r add_mag1_r add_mag2_r add_mag3_r bifemlh_r glut_max1_r glut_max2_r glut_max3_r glut_med3_r glut_min3_r semimem_r semiten_r)
    ObjectGroup R_hip_add: members=(add_brev_r add_long_r add_mag1_r add_mag2_r add_mag3_r bifemlh_r grac_r pect_r semimem_r semiten_r)
    ObjectGroup R_knee_bend: members=(bifemlh_r bifemsh_r grac_r lat_gas_r med_gas_r sar_r semimem_r semiten_r)
    ObjectGroup R_knee_ext: members=(rect_fem_r vas_int_r vas_lat_r vas_med_r)
    ObjectGroup R_ankle_pf: members=(flex_dig_r flex_hal_r lat_gas_r med_gas_r per_brev_r per_long_r soleus_r tib_post_r)
    ObjectGroup R_inverter: members=(ext_hal_r flex_dig_r flex_hal_r tib_ant_r tib_post_r)
    ObjectGroup R_ankle_df: members=(ext_dig_r ext_hal_r per_tert_r tib_ant_r)
    ObjectGroup R_everter: members=(ext_dig_r per_brev_r per_long_r per_tert_r)
    ObjectGroup L_hip_abd: members=(glut_max1_l glut_med1_l glut_med2_l glut_med3_l glut_min1_l glut_min2_l glut_min3_l peri_l sar_l tfl_l)
    ObjectGroup L_hip_flex: members=(add_brev_l add_long_l glut_med1_l glut_min1_l grac_l iliacus_l pect_l psoas_l rect_fem_l sar_l tfl_l)
    ObjectGroup L_hip_inrot: members=(glut_med1_l glut_min1_l iliacus_l psoas_l tfl_l)
    ObjectGroup L_hip_exrot: members=(gem_l glut_med3_l glut_min3_l peri_l quad_fem_l)
    ObjectGroup L_hip_ext: members=(add_long_l add_mag1_l add_mag2_l add_mag3_l bifemlh_l glut_max1_l glut_max2_l glut_max3_l glut_med3_l glut_min3_l semimem_l semiten_l)
    ObjectGroup L_hip_add: members=(add_brev_l add_long_l add_mag1_l add_mag2_l add_mag3_l bifemlh_l grac_l pect_l semimem_l semiten_l)
    ObjectGroup L_knee_bend: members=(bifemlh_l bifemsh_l grac_l lat_gas_l med_gas_l sar_l semimem_l semiten_l)
    ObjectGroup L_knee_ext: members=(rect_fem_l vas_int_l vas_lat_l vas_med_l)
    ObjectGroup L_ankle_pf: members=(flex_dig_l flex_hal_l lat_gas_l med_gas_l per_brev_l per_long_l soleus_l tib_post_l)
    ObjectGroup L_inverter: members=(ext_hal_l flex_dig_l flex_hal_l tib_ant_l tib_post_l)
    ObjectGroup L_ankle_df: members=(ext_dig_l ext_hal_l per_tert_l tib_ant_l)
    ObjectGroup L_everter: members=(ext_dig_l per_brev_l per_long_l per_tert_l)
    ObjectGroup back_ext: members=(ercspn_l ercspn_r)
    ObjectGroup back_rlb: members=(ercspn_r extobl_r intobl_r)
    ObjectGroup back_introt: members=(ercspn_r extobl_l intobl_r)
    ObjectGroup back_llb: members=(ercspn_l extobl_l intobl_l)
    ObjectGroup back_extrot: members=(ercspn_l extobl_r intobl_l)
    ObjectGroup back_flex: members=(extobl_l extobl_r intobl_l intobl_r)
  ContactGeometrySet:
    ContactHalfSpace plate: body_name=ground location=(0 0 0) orientation=(0 0 -1.5708)
      # Body name to connect the contact geometry to
      # Location of geometry center in the body frame
      # Orientation of geometry in the body frame
      # Display Pref. 0:Hide 1:Wire 3:Flat 4:Shaded
    ContactSphere s1_r: body_name=calcn_r location=(0.0014884 -0.021859 0.0011736) radius=0.0336
      # Body name to connect the contact geometry to
      # Location of geometry center in the body frame
    ContactSphere s2_r: body_name=calcn_r location=(0.056235 -0.021859 0.0084168) radius=0.033399
      # Body name to connect the contact geometry to
      # Location of geometry center in the body frame
    ContactSphere s3_r: body_name=calcn_r location=(0.16 -0.021859 0.020861) radius=0.027586
      # Body name to connect the contact geometry to
      # Location of geometry center in the body frame
    ContactSphere s4_r: body_name=toes_r location=(0.03675 -0.021448 0.0019623) radius=0.018698
      # Body name to connect the contact geometry to
      # Location of geometry center in the body frame
    ContactSphere s5_r: body_name=toes_r location=(0.015536 -0.021448 0.010749) radius=0.020351
      # Body name to connect the contact geometry to
      # Location of geometry center in the body frame
    ContactSphere s1_l: body_name=calcn_l location=(0.0014884 -0.021859 -0.0011736) radius=0.0336
      # Body name to connect the contact geometry to
      # Location of geometry center in the body frame
    ContactSphere s2_l: body_name=calcn_l location=(0.056235 -0.021859 -0.0084168) radius=0.033399
      # Body name to connect the contact geometry to
      # Location of geometry center in the body frame
    ContactSphere s3_l: body_name=calcn_l location=(0.16 -0.021859 -0.020861) radius=0.027586
      # Body name to connect the contact geometry to
      # Location of geometry center in the body frame
    ContactSphere s4_l: body_name=toes_l location=(0.03675 -0.021448 -0.0019623) radius=0.018698
      # Body name to connect the contact geometry to
      # Location of geometry center in the body frame
    ContactSphere s5_l: body_name=toes_l location=(0.015536 -0.021448 -0.010749) radius=0.020351
      # Body name to connect the contact geometry to
      # Location of geometry center in the body frame
