# OpenSim document version 40000
AnalyzeTool dummy_motion:
  model_file: D:\school\WTK\thesis\model\3dpredictsim\OpenSimModel\Rajagopal2015.osim
  replace_force_set: false
  results_directory: D:\school\WTK\thesis\model\3dpredictsim\Polynomials\testRajagopal\MuscleAnalysis
  output_precision: 8
  initial_time: 0.01
  final_time: 50
  solve_for_equilibrium_for_auxiliary_states: false
  maximum_number_of_integrator_steps: 20000
  maximum_integrator_step_size: 1
  minimum_integrator_step_size: 1e-8
  integrator_error_tolerance: 1e-5
  coordinates_file: D:\school\WTK\thesis\model\3dpredictsim\Polynomials\testRajagopal\dummy_motion.mot
  lowpass_cutoff_frequency_for_coordinates: -1
  AnalysisSet Analyses:
    MuscleAnalysis: start_time=0.01 end_time=50 step_interval=1 in_degrees=true muscle_list=all
        moment_arm_coordinate_list=(hip_flexion_r hip_adduction_r hip_rotation_r knee_angle_r ankle_angle_r subtalar_angle_r mtp_angle_r)
        compute_moments=true
