# OpenSim document version 40000
InverseKinematicsTool:
  results_directory: ./
  constraint_weight: Inf
  accuracy: 1e-5
  marker_file: static_shoes_full.trc
  time_range: 0.01 10
  report_errors: true
  report_marker_locations: false
  IKTaskSet:
    IKMarkerTask RASI: apply=true weight=1
    IKMarkerTask LASI: apply=true weight=1
    IKMarkerTask CLAV: apply=true weight=1
    IKMarkerTask RSHO: apply=true weight=1
    IKMarkerTask LSHO: apply=true weight=1
    IKMarkerTask RKNE: apply=true weight=1
    IKMarkerTask RKNE_med: apply=true weight=1
    IKMarkerTask RTHI3: apply=true weight=1
    IKMarkerTask RANK: apply=true weight=1
    IKMarkerTask RANK_med: apply=true weight=1
    IKMarkerTask RTIB1: apply=true weight=1
    IKMarkerTask RTIB2: apply=true weight=1
    IKMarkerTask RTIB3: apply=true weight=1
    IKMarkerTask LKNE: apply=true weight=1
    IKMarkerTask LKNE_med: apply=true weight=1
    IKMarkerTask LTHI3: apply=true weight=1
    IKMarkerTask LANK: apply=true weight=1
    IKMarkerTask LANK_med: apply=true weight=1
    IKMarkerTask LTIB1: apply=true weight=1
    IKMarkerTask LTIB2: apply=true weight=1
    IKMarkerTask LTIB3: apply=true weight=1
    IKMarkerTask RPSI: apply=true weight=1
    IKMarkerTask LPSI: apply=true weight=1
    IKMarkerTask RELB: apply=true weight=1
    IKMarkerTask LELB: apply=true weight=1
    IKMarkerTask RW1: apply=true weight=1
    IKMarkerTask LW1: apply=true weight=1
    IKMarkerTask RHEE: apply=true weight=1
    IKMarkerTask RMT5: apply=true weight=1
    IKMarkerTask RTOE: apply=true weight=1
    IKMarkerTask RMT1: apply=true weight=1
    IKMarkerTask LHEE: apply=true weight=1
    IKMarkerTask LMT5: apply=true weight=1
    IKMarkerTask LTOE: apply=true weight=1
    IKMarkerTask LMT1: apply=true weight=1
